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# Bearing Sizing
# Spindle Shaft Characteristics
# Applied Forces
F_feed_z := 40 N
F_cut_x := 30 N
F_cut_y := 120 N
# Rotational Speed | Geometry Between Bearings
N_rot := 2500 rpm
D_bc := 19 mm
L_cd := 50 mm
# Young's Modulus | Shaft Stiffness
E_s := 210 GPa
K_s := π*(D_bc/2)^2*E_s/L_cd = 1190.82 N/μm
# Allowable Deflection
δ_z := 50 μm
# Spindle Housing Characteristics
# Outer Diameter | Inner Diameter | Total Length
D_h_outer := 2.875 in
D_h_inner := 42 mm
L_h := 93 mm
# Young's Modulus | Housing Stiffness
E_h := 69 GPa
K_h := π*((D_h_outer/2)^2 - (D_h_inner/2)^2)*E_h/L_h = 2079.51 N/μm
# Washers Characteristics (Wave washer)
# Working Load | Deflection @ Working Load | Washer Stiffness
P_w := 50 lbf = 0.222411 kN
δ_w := 0.187 in
K_w := P_w/δ_w = 0.0468254 N/μm
# Number of washers
N_w := 3
# Bearing Parameters (LM11949 - LM11910, Tapered Roller Bearings)
# ISO factors | Bearing Stiffness
e := 0.68
Y_2 := 1.41
K_b_static := 90 N/μm
# Dynamic Radial Rating (1 million revolutions)
C_1 := 8320 N
# Constants for Bearing Stiffness
a_stiffness := 5.58 N/μm
b_stiffness := 17.7 N/μm
# Preload calculation
# System Stiffness
K_system := F_feed_z/δ_z
# Bearing Stiffness
a := ((K_system - K_w)*(K_h + K_s) - K_h*K_s)/(K_h*K_s*K_w) = -21.3347 μm/N
b := ((K_h*K_s + K_w*(K_h + K_s))*K_system - 2*K_w*K_h*K_s)/(K_w*K_h*K_s) = 15.0858
c := K_system
Δ := b^2 - 4*a*c = 295.853
K_b :=
    if Δ > 0
        if (-b - sqrt(Δ))/(2*a) > 0
            (-b - sqrt(Δ))/(2*a)
        else
            (-b + sqrt(Δ))/(2*a)
    else if Δ == 0
        -b/(2*a)
    else
        0
    = 0.756659 N/μm
# Preload
F_preload_min := exp((K_b - b_stiffness)/a_stiffness)*1 N + F_feed_z = 40.048 N
# Bearing Forces
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# Preload
# Factor of Safety | Force
s := 2
F_preload := s*F_preload_min = 80.096 N
# Loads
# Radial Load | Axial Load
F_r := sqrt(F_cut_x^2 + F_cut_y^2) = 123.693 N
F_a := F_preload + F_feed_z = 120.096 N
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# Dynamic Equivalent Radial Load
P_r :=
    if F_a/F_r ≤ e
        F_r
    else
        0.4*F_r + Y_2*F_a
# Bearing Life
L_10 := (C_1/P_r)^(10/3)*(10^6/(60*N_rot)) = 3268.99 hr
