# Bearing Sizing
# Spindle Shaft Characteristics
# Applied Forces
F_feed_z := 400 N
F_cut_x := 90 N
F_cut_y := 100 N
F_feed_z_unitless := 400  # <- used for preload calcs since symbolics can't handle units
# Rotational Speed | Geometry Between Bearings
N_rot := 700 rpm
D_cd := 5 cm
L_cd := 6 cm
# Young's Modulus | Shaft Stiffness
E_s := 210 GPa
K_s := π*(D_cd/2)^2*E_s/L_cd = 6872.23 N/μm
# Spindle Housing Characteristics
# Outer Diameter | Inner Diameter | Total Length
D_h_outer := 72 mm
D_h_inner := 45 mm
L_h := 110 mm
# Young's Modulus | Housing Stiffness
E_h := 69 GPa
K_h := π*((D_h_outer/2)^2 - (D_h_inner/2)^2)*E_h/L_h = 1556.31 N/μm
# Washers Characteristics (9712K89, Belleville Disc Springs)
# Working Load | Flat Load | Deflection @ Working Load
P_w := 910 lbf = 4.04788 kN
P_w_flat := 2833 lbf
δ_w := 0.022 in
# Washer Stiffness | Number of washers
K_w := P_w/δ_w = 7.24388 N/μm
N_w := 4
# Washers Characteristics (Wave washer)
# Working Load | Deflection @ Working Load | Washer Stiffness
P_w := 50 lbf = 0.222411 kN
δ_w := 0.187 in
K_w := P_w/δ_w = 0.0468254 N/μm
# Number of washers
N_w := 1
K_w := 1 N/μm
# Bearing Parameters (LM11949 - LM11910, Tapered Roller Bearings)
# ISO factors | Bearing Stiffness
e := 0.30
Y_2 := 2
K_b_static := 53 N/μm
K_b(F) := 17.7 N/μm + 5.87*ln(F) N/μm
# Dynamic Radial Rating (1 million revolutions)
C_1 := 39100 N
# Static Radial Rating
K_b(500) = 54.1797 N/μm
C_0 := 32000 N
# Dynamic Thrust Rating (90 million revolutions)
C_a90 := 5220 N
# Bolt Characteristics (M6)
# Pitch Diameter | Clamped Length | Young's Modulus
D_bolt_pitch := 5.35 mm
L_bolt := 10 mm
E_bolt := 210 GPa  # I assumed same bolt geometry on both ends of the spindle housing.
# Bolt Stiffness | Outer Diameter
D_bolt_outer := 6 mm
K_bolt := π*(D_bolt_pitch/2)^2*E_bolt/L_bolt = 472.081 N/μm
# Bolt Location Diameter
D_b := 58.64 mm
# Number of bolts
N_bolts_min := ceil(π*D_b/(6*D_bolt_outer)) = 6
N_bolts_max := floor(π*D_b/(3*D_bolt_outer)) = 10
N_bolts_back := 6  # Should be between the two values above.
N_bolts_front := 4
# Preload calculation V1
# Displacement under axial load
δ_axial := F_feed_z*(1/K_s + 1/K_b_static + 1/(N_bolts_back*K_bolt) + 1/K_h + 1/(N_bolts_front*K_bolt)) = 8.21544 μm
# Minimum Preload
F_preload_min := δ_axial/(1/K_b_static + 1/K_s + 1/K_b_static + 1/(N_w*K_w) + 1/(N_bolts_back*K_bolt) + 1/K_h) = 7.908 N
# Sensitivity
# Displacement error
δ_error := 500 μm
F_error := δ_error/(1/K_b_static + 1/K_s + 1/K_b_static + 1/(N_w*K_w) + 1/(N_bolts_back*K_bolt) + 1/K_h) = 481.289 N
# Preload calculation V2
(F_p + F_feed_z)*(1/K_b(F_p + F_feed_z) + 1/K_s) + (F_p - F_feed_z)*(1/K_b(F_p - F_feed_z) + 1/K_w) == (F_p + F_feed_z)*(1/K_b(F_p + F_feed_z) + 1/K_h + 1/(K_bolt*N_bolts_back)) solve, F_p →  # error: No solution was found.
# Preload calculation V3
F_preload := F_feed_z*(-1/(N_bolts_back*K_bolt) - 1/K_h - 1/(N_bolts_back*K_bolt) + 1/K_b_static + 1/K_s - 1/K_b_static - 1/(N_w*K_w))/(1/(N_bolts_back*K_bolt) + 1/K_h + 1/(N_bolts_back*K_bolt) - 1/K_b_static - 1/K_s - 1/K_b_static - 1/(N_w*K_w)) = 386.366 N
# Preload calculation V4
F_preload := F_feed_z*(-1/(N_bolts_back*K_bolt) - 1/K_h - 1/(N_bolts_back*K_bolt) + 1/K_b(F_feed_z_unitless) + 1/K_s - 1/K_b_static - 1/(N_w*K_w))/(1/(N_bolts_back*K_bolt) + 1/K_h + 1/(N_bolts_back*K_bolt) - 1/K_b_static - 1/K_s - 1/K_b_static - 1/(N_w*K_w)) = 386.348 N
# Bearing Forces
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# Preload
# Factor of Safety | Force
s := 2
F_preload := s*F_preload_min
# Radial Loads | Axial Load
F_r := sqrt(F_cut_x^2 + F_cut_y^2) = 134.536 N
F_a := F_preload + F_feed_z = 415.816 N
# Dynamic Equivalent Radial Load
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P_r :=
    if F_a/F_r ≤ e
        F_r
    else
        0.4*F_r + Y_2*F_a
# Bearing Life
L_10 := (C_1/P_r)^(10/3)*(10^6/(60*N_rot)) = 19222.1 hr
