# Baseline Values
# Power | Pulley Diameter
P_motor := 300 W
D_motor := 2 in
# Metalworking Spindle Pulley Characteristics
# Rotational Speed
N_metal := 1000 rpm
# Pulley Diameter | Center Distance from Motor Pulley
R_metal := 2
D_metal := R_metal*D_motor = 4 in
L_motor_metal := 3.7 in = 9.398 cm
# Woodworking Spindle Pulley Characteristics
# Rotational Speed
N_wood := 2500 rpm
# Pulley Diameter | Center Distance from Motor Pulley
R_wood := 1
L_motor_wood := 3.7 in = 9.398 cm
D_wood := 1.5 in
# Motor RPM's
# Rotational Speeds
N_motor_metal := N_metal*R_metal = 2000 rpm
N_motor_wood := N_wood*R_wood = 2500 rpm
# Belt Characteristics (not dependent on shape)
# Angle of Contact of the belt
# For Metal | For Wood
θ_motor_wood := π - 2*asin((D_wood - D_motor)/(2*L_motor_wood)) = 3.27683
θ_motor_metal := π - 2*asin((D_metal - D_motor)/(2*L_motor_metal)) = 2.59425
θ_metal := π + 2*asin((D_metal - D_motor)/(2*L_motor_metal))
θ_wood := π + 2*asin((D_wood - D_motor)/(2*L_motor_wood))  # These are the formulas for a flat belt. Do they hold for the other geometries?
# Length of the belt
# For Metal
L_belt_metal := sqrt(4*L_motor_metal^2 - (D_metal - D_motor)^2) + 1/2*(D_metal*θ_metal + D_motor*θ_motor_metal)
# Same with these
L_belt_metal = 17.0967 in
# For Wood
L_belt_wood := sqrt(4*L_motor_wood^2 - (D_wood - D_motor)^2) + 1/2*(D_wood*θ_wood + D_motor*θ_motor_wood)
L_belt_wood = 12.9147 in
# Flat Belt
# Characteristics
f_flat := 0.6/sin(1/4) = 2.42518  # Coefficient of Friction  # Efficiency
# <-- verify these values and formulas
f_flat := 0.7
η_flat := 0.8
# The textbook says that the coefficient of friction for a belt having a nylon core and leather surface
# was typically 0.7, but that it could be raised to 0.9 by employing special surface finishes.
# Output Torques
# For Metal | For Wood
T_metal := P_motor*η_flat/N_metal = 2.29183 N*m
T_wood := P_motor*η_flat/N_wood = 0.916732 N*m
# The formulas for torque seem odd as the power of the motor changes at different motor speeds.
# Pre-tension
# For Metal
F_i_metal := T_metal/D_metal*(exp(f_flat*θ_metal) + 1)/(exp(f_flat*θ_metal) - 1)
F_i_metal = 26.2472 N
# The pretension of the motor pulley is the one that matters more I believe. it's the one which is calculated in Shigley
F_i_motor_metal := P_motor/(N_motor_metal*D_motor)*(exp(f_flat*θ_motor_metal) + 1)/(exp(f_flat*θ_motor_metal) - 1) = 39.1532 N
# For Wood
# The formulas for torque should be double checked
F_i_wood := T_wood/D_wood*(exp(f_flat*θ_wood) + 1)/(exp(f_flat*θ_wood) - 1)
F_i_wood = 30.7425 N
F_i_motor_wood := P_motor/(N_motor_wood*D_motor)*(exp(f_flat*θ_motor_wood) + 1)/(exp(f_flat*θ_motor_wood) - 1) = 27.6194 N
# Tensions
ρ := 1250*kg/m^3
b := .5*in
h := .055*in
g = 9.80665 m/s^2
w := ρ*b*h = 0.0221774 kg/m
F_c_wood_motor := w*(π*D_motor*N_motor_wood)^2 = 38.7146 N
F_c_metal_motor := w*(π*D_motor*N_motor_metal)^2 = 24.7773 N
F_c_metal_spindle := w*(π*D_metal*N_metal)^2 = 24.7773 N
F_load_on_metal_motor := 2*F_i_motor_metal + 2*F_c_metal_motor = 127.861 N
F_load_on_wood_motor := 2*F_i_motor_wood + 2*F_c_wood_motor = 132.668 N
P_transmitted_metal := 1
# Will Our Belt Die?
# C(v) = 1 for polyamide and urethane belts (but not leather belts, 17-9)
F_a := 9.8 lbf/in
C_v := 1
C_p := 1
# C(p) = 1 for urethane belts (but not polyamide or leather, table 17-4)
Ratio_of_Pulley_Speed_To_Belt_Length := N_motor_metal/L_belt_metal = 8820.19 1/(ft*min)
F_1a := b*F_a*C_p*C_v = 21.7963 N
F_1 := F_c_metal_motor + F_i_motor_metal*2*exp(f_flat*θ_motor_metal)/(exp(f_flat*θ_motor_metal) + 1) = 92.1273 N
# If F(1a) > F(1) then belt is allowable. Otherwise, switch belt.
# Round Belt
# V-Belt
# Timing Belt
