# Baseline Values
# Pulley Diameter
D_motor := 2 in
# Metalworking Spindle Pulley Characteristics
# Rotational Speed
N_metal := 1000 rpm
# Pulley Diameter | Center Distance from Motor Pulley
R_metal := 2
D_metal := R_metal*D_motor = 4 in
C_metal := 3.7 in = 9.398 cm
# Woodworking Spindle Pulley Characteristics
# Rotational Speed
N_wood := 2500 rpm
# Pulley Diameter | Center Distance from Motor Pulley
R_wood := 1
C_wood := 3.7 in = 9.398 cm
D_wood := R_wood*D_motor = 2 in
# Motor RPM's
# Rotational Speeds
N_motor_metal := N_metal*R_metal = 2000 rpm
N_motor_wood := N_wood*R_wood = 2500 rpm
# Belt Characteristics (not dependent on shape)
# Angle of Contact of the belt
# For Metal | For Wood
θ_motor_wood := π - 2*asin((D_wood - D_motor)/(2*C_wood)) = 3.14159
θ_motor_metal := π - 2*asin((D_metal - D_motor)/(2*C_metal)) = 2.59425
θ_metal := π + 2*asin((D_metal - D_motor)/(2*C_metal))
θ_wood := π + 2*asin((D_wood - D_motor)/(2*C_wood))  # These are the formulas for a flat belt. Do they hold for the other geometries?
# Length of the belt
# For Metal
L_belt_metal := sqrt(4*C_metal^2 - (D_metal - D_motor)^2) + 1/2*(D_metal*θ_metal + D_motor*θ_motor_metal)
# Same with these
L_belt_metal = 17.0967 in
# For Wood
L_belt_wood := sqrt(4*C_wood^2 - (D_wood - D_motor)^2) + 1/2*(D_wood*θ_wood + D_motor*θ_motor_wood)
L_belt_wood = 13.6832 in
# Flat Belt
# Belt & Motor Characteristics
# Belt material: Polyamide | Minimum pulley diameter: 2.4 in
# Specification: A-2 | Link to belt specs:
# Coefficient of Friction | Thickness | Width
f_flat := 0.8
t := 0.11 in
b := 0.5 in
# Allowable tension per unit width at 600 ft/min | Specific weight | Nominal Power
F_a := 60 lbf/in
γ := 0.037 lbf/in^3
P_nom := 337 W = 0.451924 hp
# Design factor | C_v | C_p
n_d := 1.05
C_v := 1
C_p := 0.73
# Service Factor | Shock load factor
K_s := 1.25
# Surface speed
V_metal := π*D_motor*N_motor_metal/12 = 548.311 ft/min
V_wood := π*D_motor*N_motor_wood/12 = 685.389 ft/min
ω := 12*γ*b*t = 0.29304 lbf/ft
g = 9.80665 m/s^2
# Centrifugal tension
F_c_metal := ω/g*(V_metal/60)^2 = 0.000211286 lbf
F_c_wood := ω/g*(V_wood/60)^2 = 0.000330134 lbf
# Torque
n_metal := N_motor_metal/rpm = 2000
H_nom := P_nom/hp = 0.451924
n_wood := N_motor_wood/rpm = 2500
T_metal := (63025*H_nom*K_s*n_d)/n_metal*lbf*in = 18.6917 lbf*in
T_wood := (63025*H_nom*K_s*n_d)/n_wood*lbf*in = 14.9533 lbf*in
# Tensions
F_1_a := b*F_a*C_p*C_v = 21.9 lbf
F_2_metal := F_1_a - (2*T_metal)/D_motor = 3.20833 lbf
F_2_wood := F_1_a - (2*T_wood)/D_motor = 6.94667 lbf
F_i_metal := (F_1_a + F_2_metal)/2 - F_c_metal = 12.554 lbf
F_i_wood := (F_1_a + F_2_wood)/2 - F_c_wood = 14.423 lbf
# Round Belt
# V-Belt
# Timing Belt
