# Metalworking Spindle Pulley Characteristics
# Rotational Speed
N_metal := 2500 rpm
# Pulley Diameter | Center Distance from Motor Pulley
D_metal := 8.255 cm
L_motor_metal := 9.3345 cm
# Woodworking Spindle Pulley Characteristics
# Rotational Speed
N_wood := 12000 rpm
# Pulley Diameter | Center Distance from Motor Pulley
D_wood := 2.54 cm
L_motor_wood := 9.3345 cm
# Motor Pulley Characteristics
# Power | Pulley Diameter
P_motor := 500 W
D_motor := 2.54 cm
# Rotational Speeds
N_motor_metal := N_metal*D_metal/D_motor
N_motor_wood := N_wood*D_wood/D_motor
# Belt Characteristics (not dependent on shape)
# Angle of Contact of the belt
# For Metal | For Wood
θ_motor_metal := π - 2*asin((D_metal - D_motor)/(2*L_motor_metal))
θ_motor_wood := π - 2*asin((D_wood - D_motor)/(2*L_motor_wood))
θ_metal := π + 2*asin((D_metal - D_motor)/(2*L_motor_metal))
θ_wood := π + 2*asin((D_wood - D_motor)/(2*L_motor_wood))
# Length of the belt
# For Metal
L_belt_metal := sqrt(4*L_motor_metal^2 - (D_metal - D_motor)^2) + 1/2*(D_metal*θ_metal + D_motor*θ_motor_metal)
L_belt_metal = 0.365075 m
# For Wood
L_belt_wood := sqrt(4*L_motor_wood^2 - (D_wood - D_motor)^2) + 1/2*(D_wood*θ_wood + D_motor*θ_motor_wood)
L_belt_wood = 0.266486 m
# Flat Belt
# Characteristics
# Coefficient of Friction | Efficiency
f_flat := 0.7
η_flat := 0.98
# Output Torques
# For Metal | For Wood
T_wood := P_motor*η_flat/N_wood
T_metal := P_motor*η_flat/N_metal
# Pre-tension
# For Metal
F_i_metal := T_metal/D_metal*(exp(f_flat*θ_metal) + 1)/(exp(f_flat*θ_metal) - 1)
F_i_metal = 26.1777 N
F_i_motor_metal := P_motor/(N_motor_metal*D_motor)*(exp(f_flat*θ_motor_metal) + 1)/(exp(f_flat*θ_motor_metal) - 1) = 32.7097 N
# For Wood
F_i_wood := T_wood/D_wood*(exp(f_flat*θ_wood) + 1)/(exp(f_flat*θ_wood) - 1)
F_i_wood = 19.1813 N
F_i_motor_wood := P_motor/(N_motor_wood*D_motor)*(exp(f_flat*θ_motor_wood) + 1)/(exp(f_flat*θ_motor_wood) - 1) = 19.5728 N
# Round Belt
# V-Belt
# Timing Belt
