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# Full Model Overview
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# Spindle Model
# Non-Spindle Shaft Dimensions
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D_bearing_inner := 0.75 in
D_chuck := 2 cm
D_part := 30 mm
L_part := 5 cm
L_shim := 3.175 mm
A_shim := 4.65*cm^2
L_housing := 3.5 in
D_housing_inner := 1.781 in
D_housing_outer := 2.875 in
# Thermal
ΔT_spindle := 0 °C
ΔT_spindle := ΔT_spindle - 273.15 K
ΔT_housing := 0 °C
ΔT_housing := ΔT_housing - 273.15 K
# Applied Forces
F_cut_x := 50 N
F_cut_y := 100 N
F_feed_z := 50 N
T_pulley := 3.45 N*m
F_preload := 50 N
F_t := 0 N
# Spindle Shaft Dimensions
L_ab := 16.30 mm
L_bc := 29.54 mm
L_cd := 50 mm
L_de := 46.12 mm
L_ef := 18 mm
D_bc := D_bearing_inner
D_de := D_bearing_inner
D_ef := D_chuck
D_cd := 1 in
D_ab := D_bc
L_total := L_ef + L_de + L_cd + L_bc + L_ab
a_bearing := 5.6 mm
L_a := L_ab + L_bc + a_bearing
L_b := L_ab + L_bc + L_cd - a_bearing
# Material Properties
E_steel := 200 GPa
E_aluminium := 68.9 GPa
G_steel := 80 GPa
α_T_steel := 10.8*10^-6 1/Δ°C
α_T_aluminium := 23.6*10^-6 1/Δ°C
E_part := E_steel
G_part := G_steel
# Calculate Bearing Forces
# Forces on Bearing A (Pulley Side)
R_a_y := (F_cut_y*(L_part + L_total - L_a) - F_t*L_a)/(L_b - L_a) - F_t - F_cut_y = 308.557 N
R_a_x := (F_cut_x*(L_part + L_total - L_a) - F_feed_z*D_part/2)/(L_b - L_a) - F_cut_x
R_a_z := F_feed_z + F_preload
# Forces on Bearing B (Chuck Side)
R_b_x := -(F_cut_x*(L_part + L_total - L_a) - F_feed_z*D_part/2)/(L_b - L_a) = -184.948 N
R_b_y := -(F_cut_y*(L_part + L_total - L_a) - F_t*L_a)/(L_b - L_a) = -408.557 N
R_b_z := -F_preload
# Resistive Moment
M_r := (L_cd + (L_bc/2) + (L_de/2))*(R_a_y - R_b_y)
# Other Stiffnesses - Bearings, Shims, Bolts & Washers
K_b := 5 N/μm
k_shim := E_aluminium*A_shim/L_shim
k_bolts := 6*(472.081 N/μm)
k_washers := 5*0.047*N/μm
# HTMS - Segment FP (Part)
I_fp := π*D_part^4/64
J_fp := π*D_part^4/32
A_fp := π*D_part^2/2
U_S := [1, 0, 0, 0; 0, 1, 0, 0; 0, 0, 1, 0; 0*m^-1, 0 m^-1, 0 m^-1, 1 m^-1]
# Nominal geometry
T_n_fp := [1, 0, 0, 0 m; 0, 1, 0, 0 m; 0, 0, 1, L_part; 0, 0, 0, 1*m]
# Translation errors
T_z_fp := [1, 0, 0, 0*m; 0, 1, 0, 0*m; 0, 0, 1, -F_feed_z*L_part/(E_part*A_fp); 0, 0, 0, 1*m]
T_y_fp := [1, 0, 0, 0*m; 0, 1, 0, F_cut_y*L_part^3/(3*E_part*I_fp); 0, 0, 1, 0*m; 0, 0, 0, 1*m]
T_x_fp := [1, 0, 0, F_cut_x*L_part^3/(3*E_part*I_fp); 0, 1, 0, 0*m; 0, 0, 1, 0*m; 0, 0, 0, 1*m]
# Rotation errors
R_z_fp := [
    1, F_cut_y*D_part/2*L_part/(J_fp*G_part), 0, 0*m;
    -F_cut_y*D_part/2*L_part/(J_fp*G_part), 1, 0, 0*m;
    0, 0, 1, 0*m;
    0, 0, 0, 1*m
]
R_x_fp := [
    1, 0, 0, 0*m;
    0, 1, F_cut_y*L_part^2/(2*E_part*I_fp), 0*m;
    0, -(F_cut_y*L_part^2/(2*E_part*I_fp)), 1, 0*m;
    0, 0, 0, 1*m
]
R_y_fp := [
    1, 0, F_cut_x*L_part^2/(2*E_part*I_fp) - F_feed_z*D_part/2*L_part/(E_part*I_fp), 0*m;
    0, 1, 0, 0*m;
    -(F_cut_x*L_part^2/(2*E_part*I_fp) + F_feed_z*D_part/2*L_part/(E_part*I_fp)), 0, 1, 0*m;
    0, 0, 0, 1*m
]
# Actual Position
T_fp := (U_S*T_n_fp)*U_S*T_x_fp*U_S*T_y_fp*U_S*T_z_fp
R_fp := (U_S*R_x_fp)*(U_S*R_y_fp)*(U_S*R_z_fp)
H_fp := T_fp*R_fp
# HTMs - Segment EF (Chuck Mount)
I_ef := π*D_ef^4/64
J_ef := π*D_ef^4/32
A_ef := π*D_ef^2/2
E_shaft := E_steel
G_shaft := G_steel
α_shaft := α_T_steel
# Local Forces
F_z_ef := -F_feed_z
F_y_ef := F_cut_y
F_x_ef := F_cut_x
M_z_ef := -F_cut_y*D_part/2
M_y_ef := F_cut_x*L_part + F_feed_z*D_part/2
M_x_ef := F_cut_y*L_part
# Nominal geometry
T_n_ef := [1, 0, 0, 0*m; 0, 1, 0, 0*m; 0, 0, 1, L_ef; 0, 0, 0, 1*m]
# Translation errors
T_z_ef := [1, 0, 0, 0*m; 0, 1, 0, 0*m; 0, 0, 1, -F_z_ef*L_ef/(A_ef*E_shaft); 0, 0, 0, 1*m]
T_y_ef := [
    1, 0, 0, 0*m;
    0, 1, 0, M_x_ef*L_ef^2/(2*E_shaft*I_ef) + F_y_ef*L_ef^3/(3*E_shaft*I_ef);
    0, 0, 1, 0*m;
    0, 0, 0, 1*m
]
T_x_ef := [
    1, 0, 0, M_y_ef*L_ef^2/(2*E_shaft*I_ef) + F_x_ef*L_ef^3/(3*E_shaft*I_ef);
    0, 1, 0, 0*m;
    0, 0, 1, 0*m;
    0, 0, 0, 1*m
]
# Rotation errors
R_z_ef := [
    1, -(M_z_ef*L_ef/(J_ef*G_shaft)), 0, 0*m;
    M_z_ef*L_ef/(J_ef*G_shaft), 1, 0, 0*m;
    0, 0, 1, 0*m;
    0, 0, 0, 1*m
]
R_x_ef := [
    1, 0, 0, 0*m;
    0, 1, M_x_ef*L_ef/(E_shaft*I_ef) + F_y_ef*L_ef^2/(2*E_shaft*I_ef), 0*m;
    0, -(M_x_ef*L_ef/(E_shaft*I_ef) + F_y_ef*L_ef^2/(2*E_shaft*I_ef)), 1, 0*m;
    0, 0, 0, 1*m
]
R_y_ef := [
    1, 0, M_y_ef*L_ef/(E_shaft*I_ef) + F_x_ef*L_ef^2/(2*E_shaft*I_ef), 0*m;
    0, 1, 0, 0*m;
    -(M_y_ef*L_ef/(E_shaft*I_ef) + F_x_ef*L_ef^2/(2*E_shaft*I_ef)), 0, 1, 0*m;
    0, 0, 0, 1*m
]
# Thermal error
T_th_ef := [1, 0, 0, 0*m; 0, 1, 0, 0*m; 0, 0, 1, ΔT_spindle*α_shaft*L_ef; 0, 0, 0, 1*m]
# Actual Position
T_ef := U_S*T_n_ef*U_S*T_x_ef*U_S*T_y_ef*U_S*T_z_ef*U_S*T_th_ef
R_ef := U_S*R_x_ef*U_S*R_y_ef*U_S*R_z_ef
H_ef := T_ef*R_ef
# Spindle HTMs
# Key Dimensions
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L_ab_bearing := L_b - L_a
L_pp := L_ef + L_part
L_ap := L_ab_bearing + a_bearing + L_de
L_bp := a_bearing + L_de
L_bpp := L_bp + L_pp
# Bending x (Assuming simply supported beam)
# Translation and Rotation
v_x_bend := F_cut_x*L_bpp*L_ab_bearing^2/(6*E_shaft*I_ef) + F_cut_x*L_pp*L_bp^2/(2*E_shaft*I_ef) + F_cut_x*L_bp^3/(3*E_shaft*I_ef)
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θ_y_bend := F_cut_x*L_pp*L_bp/(E_shaft*I_ef) + F_cut_x*L_bp^2/(2*E_shaft*I_ef) + F_cut_x*L_bpp*L_ab_bearing/(6*E_shaft*I_ef)
# HTMs
T_x_beam := [1, 0, 0, v_x_bend; 0, 1, 0, 0*m; 0, 0, 1, 0*m; 0, 0, 0, 1*m] = [1, 0, 0, 5.31907e-6 m; 0, 1, 0, 0 m; 0, 0, 1, 0 m; 0, 0, 0, 1 m]
R_y_beam := [1, 0, θ_y_bend, 0*m; 0, 1, 0, 0*m; -θ_y_bend, 0, 1, 0*m; 0, 0, 0, 1*m] = [1, 0, 0.000179165, 0 m; 0, 1, 0, 0 m; -0.000179165, 0, 1, 0 m; 0, 0, 0, 1 m]
# Bending y
# Forces and Moments
M_a := F_t*L_a
M_b := F_cut_y*L_bpp
M_h := F_cut_y*L_bp
# Translation and Rotation
v_y_bend := (M_a*L_ab/(6*E_shaft*I_ef) + M_b*L_ab_bearing/(6*E_shaft*I_ef))*L_bp + M_h*L_bp^2/(2*E_shaft*I_ef)
θ_x_bend := M_a*L_ab/(6*E_shaft*I_ef) + M_b*L_ab_bearing/(2*E_shaft*I_ef) + M_h*L_bp/(E_shaft*I_ef)
# HTMs
T_y_beam := [1, 0, 0, 0*m; 0, 1, 0, v_y_bend; 0, 0, 1, 0*m; 0, 0, 0, 1*m] = [1, 0, 0, 0 m; 0, 1, 0, 6.95287e-6 m; 0, 0, 1, 0 m; 0, 0, 0, 1 m]
R_x_beam := [1, 0, 0, 0*m; 0, 1, θ_x_bend, 0*m; 0, -θ_x_bend, 1, 0*m; 0, 0, 0, 1*m] = [1, 0, 0, 0 m; 0, 1, 0.000318152, 0 m; 0, -0.000318152, 1, 0 m; 0, 0, 0, 1 m]
# Compression z
# Stiffness Equivalence
k_shaft := (L_ab_bearing/(E_shaft*A_ef))^-1 = 3238.76 N/μm
# Under Preload | Under Feed Load
k_equiv_preload := 1/(1/k_shim + 1/K_b + 1/k_shaft + 1/K_b + 1/k_washers)
k_equiv_feed := 1/(1/k_bolts + 1/k_shim + 1/K_b + 1/k_shaft) + 1/(1/K_b + 1/k_washers)
# Translations and Rotation
δ_feed := -F_feed_z/k_equiv_feed = -9.60522 μm
θ_z_tor := M_z_ef*L_ap/(J_ef*G_shaft)
# HTMs
T_z_beam := [1, 0, 0, 0*m; 0, 1, 0, 0*m; 0, 0, 1, δ_feed; 0, 0, 0, 1*m] = [1, 0, 0, 0 m; 0, 1, 0, 0 m; 0, 0, 1, -9.60522e-6 m; 0, 0, 0, 1 m]
R_z_beam := [1, -θ_z_tor, 0, 0*m; θ_z_tor, 1, 0, 0*m; 0, 0, 1, 0*m; 0, 0, 0, 1*m] = [1, 0.00010805, 0, 0 m; -0.00010805, 1, 0, 0 m; 0, 0, 1, 0 m; 0, 0, 0, 1 m]
# Thermal error
T_th_spindle := [1, 0, 0, 0*m; 0, 1, 0, 0*m; 0, 0, 1, ΔT_spindle*α_shaft*(L_cd + L_de); 0, 0, 0, 1*m] = [1, 0, 0, 0 m; 0, 1, 0, 0 m; 0, 0, 1, 0 m; 0, 0, 0, 1 m]
# Actual Position
T_spindle := U_S*T_x_beam*U_S*T_y_beam*U_S*T_z_beam*U_S*T_th_spindle
R_spindle := U_S*R_x_beam*U_S*R_y_beam*U_S*R_z_beam
H_spindle := T_spindle*R_spindle
# Bearing HTMs
# Bearing deflections and rotations
δ_x_bearing := -(R_a_x + R_b_x)/(2*K_b)
δ_y_bearing := -(R_a_y + R_b_y)/(2*K_b)
θ_x := (R_a_y + R_b_y)/(L_ab_bearing*K_b)
θ_y := (R_a_x + R_b_x)/(L_ab_bearing*K_b)
R_a_x = 134.948 N
R_b_x = -184.948 N
# Translation errors
T_x_bearing := [1, 0, 0, δ_x_bearing; 0, 1, 0, 0*m; 0, 0, 1, 0*m; 0, 0, 0, 1*m] = [1, 0, 0, 5e-6 m; 0, 1, 0, 0 m; 0, 0, 1, 0 m; 0, 0, 0, 1 m]
T_y_bearing := [1, 0, 0, 0*m; 0, 1, 0, δ_y_bearing; 0, 0, 1, 0*m; 0, 0, 0, 1*m] = [1, 0, 0, 0 m; 0, 1, 0, 1e-5 m; 0, 0, 1, 0 m; 0, 0, 0, 1 m]
# Rotation errors
R_x_bearing := [1, 0, 0, 0*m; 0, 1, -θ_x, 0*m; 0, θ_x, 1, 0*m; 0, 0, 0, 1*m] = [1, 0, 0, 0 m; 0, 1, 0.000515464, 0 m; 0, -0.000515464, 1, 0 m; 0, 0, 0, 1 m]
R_y_bearing := [1, 0, θ_y, 0*m; 0, 1, 0, 0*m; -θ_y, 0, 1, 0*m; 0, 0, 0, 1*m] = [1, 0, -0.000257732, 0 m; 0, 1, 0, 0 m; 0.000257732, 0, 1, 0 m; 0, 0, 0, 1 m]
# Actual Position
T_bearing := U_S*T_x_bearing*U_S*T_y_bearing
R_bearing := U_S*R_x_bearing*U_S*R_y_bearing
H_bearing := T_bearing*R_bearing
# Housing HTMs
# Key Dimensions
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E_housing := E_aluminium
α_housing := α_T_aluminium
A_housing := π*(D_housing_outer^2/4 - D_housing_inner^2/4)
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# Compression z
# Stiffness Equivalence
k_housing := (L_housing/(E_housing*A_housing))^-1 = 2000.35 N/μm
# HTMs
T_z_housing := [1, 0, 0, 0*m; 0, 1, 0, 0*m; 0, 0, 1, -R_a_z/k_housing; 0, 0, 0, 1*m] = [1, 0, 0, 0 m; 0, 1, 0, 0 m; 0, 0, 1, -4.99914e-8 m; 0, 0, 0, 1 m]
# Thermal error
T_th_housing := [1, 0, 0, 0*m; 0, 1, 0, 0*m; 0, 0, 1, -ΔT_housing*α_housing*L_housing; 0, 0, 0, 1*m] = [1, 0, 0, 0 m; 0, 1, 0, 0 m; 0, 0, 1, 0 m; 0, 0, 0, 1 m]
# Actual Position
T_housing := U_S*T_z_housing*U_S*T_th_housing
H_housing := T_housing
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# Tool Mount & Cross-Slide - HTMs
# Notes
# The stiffnesses for the following parts are considered as very high in the leadscrew chain and are therefore disregarded for the equivalent stiffness calculation:
# - Leadscrew Holder
# - Preload Nut
# - Tool Holder
# Flexure - Characteristics
# Dimensions - Tool Holder to Leadscrew Holder
w_flexure := 1.5 cm
h_flexure := 0.5 in
L_flexure := 7.565 cm
# Material Properties | Dimensions - Center to Tool Holder
E_flexure := 70 GPa
L_flexure_center := 2.939 cm
# Stiffnesses - Flexure without leadscrew
k_flexure_x := 0.0134 N/μm
k_flexure_y := 0.9 N/μm
k_flexure_z := 12 N/μm
k_flexure_θx := 4222 N*m/rad
k_flexure_θy := 2336 N*m/rad
k_flexure_θz := 1880 N*m/rad
# Leadscrew Characteristics
# Reference
# Left Hand: https://www.mcmaster.com/90036A229/
# Dimensions
d_thread := 0.25 in
TPI_thread := 20 1/in
P_thread := 1/TPI_thread
L_ls_free := 4.495 cm
# Properties
E_ls := 200 GPa
k_leadscrew := (π*(d_thread/2)^2)*E_ls/L_ls_free = 140.909 N/μm
# Leadscrew Bearings Characteristics (Thrust Ball Bearing)
# Reference
# https://www.mcmaster.com/6655K13/
# Bearing Properties
k_bearing := 2.5 N/μm
# Toolpost Characteristics
# Reference
# https://www.dropbox.com/s/odyxwst0esw7gmy/272L-Cross-001-Toolpost-2017.PDF?dl=0
# Toolpost Properties
h_tool_flexure := 0.48 in
L_tool_holes := 0.50 in
E_toolpost := 69 GPa
w_toolpost := 1.8 in
L_toolpost := 1 in
G_toolpost := 27 GPa
# Tool Characteristics
# Reference
# https://www.mcmaster.com/3367A333/
# Tool Properties
ΔT_tool := 0 °C
ΔT_tool := ΔT_tool - 273.15 K = 0 K
ΔT_flexure_toolmount := 0 °C
ΔT_flexure_toolmount := ΔT_flexure_toolmount - 273.15 K = 0 K
α_T_carbide := 7.0*10^-6 1/Δ°C
α_T_HSS := 11.5*10^-6 1/Δ°C
α_tool := α_T_HSS
L_tool_free := 0.75 in
α_flexure_toolmount := α_T_aluminium
b_tool := 0.375 in
h_tool := 0.375 in
E_tool := 210 GPa
# Equivalent Stiffness
# Leadscrew Chain
k_ls_equivalent := 1/(1/(w_flexure*h_flexure*E_flexure/L_flexure) + 1/k_leadscrew + 1/(2*k_bearing))
# Flexure and Leadscrew - Parallel
k_flexure_equivalent := k_ls_equivalent + k_flexure_x
# Cutting Edge to Carriage
k_total_equivalent := 1/(1/k_flexure_equivalent + 1/(b_tool*h_tool*E_tool/L_tool_free)) = 4.69121 N/μm
# Moments of Toolpost on Flexure (for FEA)
M_x_FEA := F_feed_z*(h_tool_flexure + h_tool) = 1.08585 N*m
M_y_FEA := -F_feed_z*(L_tool_free + L_tool_holes) = -1.5875 N*m
M_z_FEA := F_cut_x*(h_tool_flexure + h_tool) - F_cut_y*(L_tool_free + L_tool_holes) = -2.08915 N*m
# HTMs - Flexure
# Nominal geometry
T_n_flexure := [1, 0, 0, -L_flexure_center; 0, 1, 0, h_flexure; 0, 0, 1, 0 m; 0, 0, 0, 1*m]
U_S := [1, 0, 0, 0; 0, 1, 0, 0; 0, 0, 1, 0; 0*m^-1, 0 m^-1, 0 m^-1, 1 m^-1]
# Translation errors
T_z_flexure := [1, 0, 0, 0*m; 0, 1, 0, 0*m; 0, 0, 1, F_feed_z/k_flexure_z; 0, 0, 0, 1*m]
T_y_flexure := [1, 0, 0, 0*m; 0, 1, 0, -F_cut_y/k_flexure_y; 0, 0, 1, 0*m; 0, 0, 0, 1*m]
T_x_flexure := [1, 0, 0, -F_cut_x/k_flexure_equivalent; 0, 1, 0, 0*m; 0, 0, 1, 0*m; 0, 0, 0, 1*m]
# Rotation errors
R_z_flexure := [1, M_z_FEA/k_flexure_θz, 0, 0*m; -M_z_FEA/k_flexure_θz, 1, 0, 0*m; 0, 0, 1, 0*m; 0, 0, 0, 1*m] = [1, -0.00111125, 0, 0 m; 0.00111125, 1, 0, 0 m; 0, 0, 1, 0 m; 0, 0, 0, 1 m]
R_x_flexure := [1, 0, 0, 0*m; 0, 1, -M_x_FEA/k_flexure_θx, 0*m; 0, M_x_FEA/k_flexure_θx, 1, 0*m; 0, 0, 0, 1*m] = [1, 0, 0, 0 m; 0, 1, -0.000257189, 0 m; 0, 0.000257189, 1, 0 m; 0, 0, 0, 1 m]
R_y_flexure := [1, 0, M_y_FEA/k_flexure_θy, 0*m; 0, 1, 0, 0*m; -M_y_FEA/k_flexure_θy, 0, 1, 0*m; 0, 0, 0, 1*m] = [1, 0, -0.00067958, 0 m; 0, 1, 0, 0 m; 0.00067958, 0, 1, 0 m; 0, 0, 0, 1 m]
# Thermal error
T_th_flexure := [
    1, 0, 0, -ΔT_flexure_toolmount*α_flexure_toolmount*L_flexure_center;
    0, 1, 0, ΔT_flexure_toolmount*α_flexure_toolmount*h_flexure;
    0, 0, 1, 0 m;
    0, 0, 0, 1*m
] = [1, 0, 0, 0 m; 0, 1, 0, 0 m; 0, 0, 1, 0 m; 0, 0, 0, 1 m]
# Actual Position
T_flexure := (U_S*T_n_flexure)*U_S*T_x_flexure*U_S*T_y_flexure*U_S*T_z_flexure*U_S*T_th_flexure
R_flexure := (U_S*R_x_flexure)*(U_S*R_y_flexure)*(U_S*R_z_flexure)
H_flexure := T_flexure*R_flexure
(U_S*T_n_flexure) - H_flexure = [
    0, 0.00111125, 0.00067958, 1.06082e-5 m;
    -0.00111108, -1.94225e-10, 0.000257189, 0.000111111 m;
    -0.000679866, -0.000256433, 0, -4.16667e-6 m;
    0 1/m, 0 1/m, 0 1/m, 0
]
# HTMs - Tool Post
I_z_toolpost := w_toolpost*L_toolpost^3/12
I_x_toolpost := L_toolpost*w_toolpost^3/12
I_y_toolpost := h_tool_flexure*L_toolpost^3/12
J_toolpost := w_toolpost*L_toolpost/12*(w_toolpost^2 + L_toolpost^2)
A_toolpost := w_toolpost*L_toolpost
# Nominal geometry
T_n_toolpost := [1, 0, 0, L_tool_holes; 0, 1, 0, h_tool_flexure; 0, 0, 1, 0 m; 0, 0, 0, 1*m]
U_S := [1, 0, 0, 0; 0, 1, 0, 0; 0, 0, 1, 0; 0*m^-1, 0 m^-1, 0 m^-1, 1 m^-1]
# Translation errors
T_z_toolpost := [
    1, 0, 0, 0*m;
    0, 1, 0, 0*m;
    0, 0, 1, F_feed_z*w_toolpost/2/(L_toolpost*h_tool_flexure*E_toolpost);
    0, 0, 0, 1*m
]
T_y_toolpost := [1, 0, 0, 0*m; 0, 1, 0, -F_cut_y*h_tool_flexure/(A_toolpost*E_toolpost); 0, 0, 1, 0*m; 0, 0, 0, 1*m]
T_x_toolpost := [
    1, 0, 0, -F_cut_x*w_toolpost^3/(48*E_toolpost*I_y_toolpost);
    0, 1, 0, 0*m;
    0, 0, 1, 0*m;
    0, 0, 0, 1*m
]
# Rotation errors
R_z_toolpost := [1, 0, 0, 0 m; 0, 1, 0, 0 m; 0, 0, 1, 0 m; 0, 0, 0, 1 m]
R_x_toolpost := [1, 0, 0, 0 m; 0, 1, 0, 0 m; 0, 0, 1, 0 m; 0, 0, 0, 1 m]
R_y_toolpost := [
    1, 0, -F_feed_z*L_tool_free*h_tool_flexure/(J_toolpost*G_toolpost), 0*m;
    0, 1, 0, 0*m;
    F_feed_z*L_tool_free*h_tool_flexure/(J_toolpost*G_toolpost), 0, 1, 0*m;
    0, 0, 0, 1*m
] = [1, 0, -1.62474e-6, 0 m; 0, 1, 0, 0 m; 1.62474e-6, 0, 1, 0 m; 0, 0, 0, 1 m]
# Thermal error
T_th_toolpost := [
    1, 0, 0, 0 m;
    0, 1, 0, ΔT_flexure_toolmount*α_flexure_toolmount*h_tool_flexure;
    0, 0, 1, 0 m;
    0, 0, 0, 1*m
]
# Actual Position
T_toolpost := (U_S*T_n_toolpost)*U_S*T_x_toolpost*U_S*T_y_toolpost*U_S*T_z_toolpost*U_S*T_th_toolpost
R_toolpost := (U_S*R_x_toolpost)*(U_S*R_y_toolpost)*(U_S*R_z_toolpost)
H_toolpost := T_toolpost*R_toolpost
# HTMs - Tool
I_y_tool := b_tool*h_tool^3/12
I_z_tool := h_tool*b_tool^3/12
J_tool := b_tool*h_tool/12*(b_tool^2 + h_tool^2)
A_tool := b_tool*h_tool
# Nominal geometry
T_n_tool := [1, 0, 0, L_tool_free; 0, 1, 0, h_tool; 0, 0, 1, 0 m; 0, 0, 0, 1*m]
# Translation errors
T_z_tool := [1, 0, 0, 0*m; 0, 1, 0, 0*m; 0, 0, 1, F_feed_z*L_tool_free^3/(3*E_tool*I_z_tool); 0, 0, 0, 1*m]
T_y_tool := [1, 0, 0, 0*m; 0, 1, 0, -F_cut_y*L_tool_free^3/(3*E_tool*I_y_tool); 0, 0, 1, 0*m; 0, 0, 0, 1*m]
T_x_tool := [1, 0, 0, -F_cut_x*L_tool_free/(A_tool*E_tool); 0, 1, 0, 0*m; 0, 0, 1, 0*m; 0, 0, 0, 1*m]
# Rotation errors
R_z_tool := [
    1, F_cut_y*L_tool_free^2/(2*E_tool*I_y_tool), 0, 0*m;
    -F_cut_y*L_tool_free^2/(2*E_tool*I_y_tool), 1, 0, 0*m;
    0, 0, 1, 0*m;
    0, 0, 0, 1*m
] = [1, 0.000125969, 0, 0 m; -0.000125969, 1, 0, 0 m; 0, 0, 1, 0 m; 0, 0, 0, 1 m]
R_x_tool := [1, 0, 0, 0*m; 0, 1, 0, 0*m; 0, 0, 1, 0*m; 0, 0, 0, 1*m]
R_y_tool := [
    1, 0, -F_feed_z*L_tool_free^2/(2*E_tool*I_z_tool), 0*m;
    0, 1, 0, 0*m;
    F_feed_z*L_tool_free^2/(2*E_tool*I_z_tool), 0, 1, 0*m;
    0, 0, 0, 1*m
] = [1, 0, -6.29843e-5, 0 m; 0, 1, 0, 0 m; 6.29843e-5, 0, 1, 0 m; 0, 0, 0, 1 m]
# Thermal error
T_th_tool := [1, 0, 0, ΔT_tool*α_tool*L_tool_free; 0, 1, 0, ΔT_tool*α_tool*h_tool; 0, 0, 1, 0 m; 0, 0, 0, 1*m] = [1, 0, 0, 0 m; 0, 1, 0, 0 m; 0, 0, 1, 0 m; 0, 0, 0, 1 m]
# Actual Position
T_tool := (U_S*T_n_tool)*U_S*T_x_tool*U_S*T_y_tool*U_S*T_z_tool*U_S*T_th_tool
R_tool := (U_S*R_x_tool)*(U_S*R_y_tool)*(U_S*R_z_tool)
H_tool := T_tool*R_tool
# Simplified Z Drive - HTMs
# Headstock - Characteristics
# Dimensions - Headstock
t_hs := 1 in
L_hs := 5.8125 in
L_g_to_screw := 1.9375 in
w_hs := 3.375 in
I_x_hs := w_hs*t_hs^3/12
# Properties
E_hs := E_aluminium
ΔT_hs := 0 °C
ΔT_hs := ΔT_hs - 273.15 K = 0 K
α_hs := α_T_aluminium
# Leadscrew (Z-drive 2) - Characteristics
# Reference
# https://www.mcmaster.com/99030A105/
# Dimensions
d_zls_major := 0.4950 in
d_zls_minor := 0.3594 in
L_zls := L_ef + t_hs + L_part
A_zls_tensile := 3.1416*((d_zls_major + d_zls_major)/4)^2
# Properties
E_z_ls := E_steel
ΔT_zls := 0 °C
ΔT_zls := ΔT_zls - 273.15 K = 0 K
α_T_1018 := 11.5*10^-6 1/Δ°C
α_zls := α_T_1018
# Carriage (Z-drive 3) - Characteristics
# Dimensions
t_z3 := 1.5 in
L_z3 := 2.578 in
w_z3 := 1 in
I_x_z3 := w_z3*t_z3^3/12
L_rails := 9*in
d_rails := (5/8) in
D_rails := 11.43 cm
# Toolpost Properties
E_z3 := 68.9 GPa
ΔT_z3 := 0 °C
ΔT_z3 := ΔT_z3 - 273.15 K = 0 K
α_z3 := α_T_aluminium
# HTMs - Headstock
# Nominal geometry
T_n_hs := [1, 0, 0, 0 m; 0, 1, 0, L_hs; 0, 0, 1, 0 m; 0, 0, 0, 1 m]
# Translation errors
T_z_hs := [1, 0, 0, 0*m; 0, 1, 0, 0*m; 0, 0, 1, -F_feed_z*L_hs^3/(3*E_hs*I_x_hs); 0, 0, 0, 1*m] = [1, 0, 0, 0 m; 0, 1, 0, 0 m; 0, 0, 1, -6.64955e-6 m; 0, 0, 0, 1 m]
# Rotation errors
R_x_hs := [
    1, 0, 0, 0*m;
    0, 1, F_feed_z*L_hs^2/(2*E_hs*I_x_hs), 0*m;
    0, -F_feed_z*L_hs^2/(2*E_hs*I_x_hs), 1, 0*m;
    0, 0, 0, 1*m
] = [1, 0, 0, 0 m; 0, 1, 6.75596e-5, 0 m; 0, -6.75596e-5, 1, 0 m; 0, 0, 0, 1 m]
# Thermal error
T_th_hs := [1, 0, 0, 0 m; 0, 1, 0, ΔT_hs*α_hs*L_hs; 0, 0, 1, 0 m; 0, 0, 0, 1*m] = [1, 0, 0, 0 m; 0, 1, 0, 0 m; 0, 0, 1, 0 m; 0, 0, 0, 1 m]
# Actual Position
T_hs := (U_S*T_n_hs)*(U_S*T_z_hs)*(U_S*T_th_hs)
R_hs := (U_S*R_x_hs)
H_hs := T_hs*R_hs
# HTMs - Z-drive Segment 1
# Nominal geometry
T_n_z1 := [1, 0, 0, 0 m; 0, 1, 0, L_g_to_screw; 0, 0, 1, 0 m; 0, 0, 0, 1 m]
# Translation errors
T_z_z1 := [
    1, 0, 0, 0*m;
    0, 1, 0, 0*m;
    0, 0, 1, -F_feed_z*L_g_to_screw^2/(6*E_hs*I_x_hs)*(3*L_hs - L_g_to_screw);
    0, 0, 0, 1*m
] = [1, 0, 0, 0 m; 0, 1, 0, 0 m; 0, 0, 1, -9.85118e-7 m; 0, 0, 0, 1 m]
# Rotation errors
R_x_z1 := [
    1, 0, 0, 0*m;
    0, 1, (F_feed_z*L_g_to_screw/(2*E_hs*I_x_hs)*(2*L_hs - L_g_to_screw)), 0*m;
    0, -F_feed_z*L_g_to_screw/(2*E_hs*I_x_hs)*(2*L_hs - L_g_to_screw), 1, 0*m;
    0, 0, 0, 1*m
] = [1, 0, 0, 0 m; 0, 1, 3.75331e-5, 0 m; 0, -3.75331e-5, 1, 0 m; 0, 0, 0, 1 m]
# Thermal error
T_th_z1 := [1, 0, 0, 0 m; 0, 1, 0, ΔT_hs*α_hs*L_g_to_screw; 0, 0, 1, 0 m; 0, 0, 0, 1*m] = [1, 0, 0, 0 m; 0, 1, 0, 0 m; 0, 0, 1, 0 m; 0, 0, 0, 1 m]
# Actual Position
T_z1 := (U_S*T_n_z1)*(U_S*T_z_z1)*(U_S*T_th_z1)
R_z1 := (U_S*R_x_z1)
H_z1 := T_z1*R_z1
# HTMs - Leadscrew (Z-drive Segment 2)
# Nominal geometry
T_n_z2 := [1, 0, 0, 0 m; 0, 1, 0, 0 m; 0, 0, 1, L_zls; 0, 0, 0, 1*m]
# Translation errors
T_z_z2 := [1, 0, 0, 0*m; 0, 1, 0, 0*m; 0, 0, 1, F_feed_z*L_zls/(A_zls_tensile*E_toolpost); 0, 0, 0, 1*m]
# Rotation errors
# Thermal error
T_th_z2 := [1, 0, 0, 0 m; 0, 1, 0, 0 m; 0, 0, 1, ΔT_zls*α_zls*L_zls; 0, 0, 0, 1*m] = [1, 0, 0, 0 m; 0, 1, 0, 0 m; 0, 0, 1, 0 m; 0, 0, 0, 1 m]
# Actual Position
T_z2 := (U_S*T_n_z2)*(U_S*T_z_z2)*(U_S*T_th_z2)
H_z2 := T_z2
# HTMs - Carriage (Z-drive Segment 3)
# Forces and Moments and Inertias for deflecting the rails
M_y_rails := -F_feed_z*D_part/2
I_bendy_rails := 2*(π*d_rails^4/64 + π*d_rails^2/4*D_rails^2/4)
I_rail := π*d_rails^4/64
M_z_rails := F_cut_y*D_part/2
# Nominal geometry
T_n_z3 := [1, 0, 0, 0 m; 0, 1, 0, L_z3; 0, 0, 1, 0 m; 0, 0, 0, 1*m]
# Translation errors
T_z_z3 := [1, 0, 0, 0*m; 0, 1, 0, 0*m; 0, 0, 1, -F_feed_z*L_z3^3/(3*E_z3*I_x_z3); 0, 0, 0, 1*m]
T_x_z3 := [
    1, 0, 0, L_zls^2*(M_y_rails*3 - L_zls*M_y_rails/L_rails)/(6*E_hs*I_bendy_rails);
    0, 1, 0, 0*m;
    0, 0, 1, 0*m;
    0, 0, 0, 1*m
] = [1, 0, 0, -3.15685e-8 m; 0, 1, 0, 0 m; 0, 0, 1, 0 m; 0, 0, 0, 1 m]
# Rotation errors
R_x_z3 := [
    1, 0, 0, 0*m;
    0, 1, F_feed_z*L_z3^2/(2*E_hs*I_x_hs), 0*m;
    0, -F_feed_z*L_z3^2/(2*E_hs*I_x_hs), 1, 0*m;
    0, 0, 0, 1*m
]
R_y_z3 := [
    1, 0, -(L_zls*M_y_rails - (L_zls^2*M_y_rails/L_rails))/(6*E_hs*I_bendy_rails), 0*m;
    0, 1, 0, 0*m;
    (L_zls*M_y_rails - (L_zls^2*M_y_rails/L_rails))/(6*E_hs*I_bendy_rails), 0, 1, 0*m;
    0, 0, 0, 1*m
] = [1, 0, 7.71381e-8, 0 m; 0, 1, 0, 0 m; -7.71381e-8, 0, 1, 0 m; 0, 0, 0, 1 m]
K_theta_x_rail := (L_z3^2/(2*E_hs*I_x_hs))^-1 = 3762213 N
K_Theta_y_rail := M_y_rails/((L_zls*M_y_rails - (L_zls^2*M_y_rails/L_rails))/(6*E_hs*I_bendy_rails)) = 9722821 J
R_z_z3 := [
    1, M_z_rails*4*L_zls^3/(D_rails^2*3*E_hs*I_rail), 0, 0*m;
    -M_z_rails*4*L_zls^3/(D_rails^2*3*E_hs*I_rail), 1, 0, 0*m;
    0, 0, 1, 0*m;
    0, 0, 0, 1*m
] = [1, 0.000580676, 0, 0 m; -0.000580676, 1, 0, 0 m; 0, 0, 1, 0 m; 0, 0, 0, 1 m]
# Thermal error
T_th_z3 := [1, 0, 0, 0 m; 0, 1, 0, ΔT_z3*α_z3*L_z3; 0, 0, 1, 0 m; 0, 0, 0, 1*m] = [1, 0, 0, 0 m; 0, 1, 0, 0 m; 0, 0, 1, 0 m; 0, 0, 0, 1 m]
# Actual Position
T_z3 := (U_S*T_n_z3)*(U_S*T_z_z3)*(U_S*T_x_z3)*(U_S*T_th_z3)
R_z3 := (U_S*R_x_z3)*(U_S*R_y_z3)*(U_S*R_z_z3)
H_z3 := T_z3*R_z3
# Summary Calculations - Spindle
# Nominal geometry of the part's tip
P_tool := [-D_part/2; 0; 0; 1] = [-0.015 m; 0 m; 0 m; 1]
# Actual position of the tool's contact point relative to the shaft end
P_tool_f_spindle := H_housing*H_bearing*H_spindle*H_ef*H_fp*P_tool = [-0.0149922 m; 8.02982e-5 m; 0.06799 m; 1]
# Nominal position of the tool's contact point relative to the shaft end
P_tool_0_spindle := (U_S*T_n_ef*U_S*T_n_fp*P_tool) = [-0.015 m; 0 m; 0.068 m; 1]
# Error in position of the tool's contact point relative to the shaft end
P_deflection_spindle := P_tool_f_spindle - P_tool_0_spindle = [7.75777; 80.2982; -10.0264; 0 1/m] μm
# Summary Calculations - Headstock
# Nominal geometry of end of segment
P_hs_end := [0 m; 0; 0; 1]
# Actual position end of segment
P_hs_f := H_hs*P_hs_end
# Nominal position of the tool's contact point relative to the shaft end
P_hs_0 := U_S*T_n_hs*P_hs_end
# Error in position of the tool's contact point relative to the shaft end
P_deflection_hs := P_hs_f - P_hs_0
# Summary Calculations - Z-drive
# Nominal geometry of end of segment
P_bottom_flexure := [0 m; 0; 0; 1]
# Actual position end of segment
P_zdrive_f := H_z1*H_z2*H_z3*P_bottom_flexure
# Nominal position of the tool's contact point relative to the shaft end
P_zdrive_0 := (U_S*T_n_z1)*(U_S*T_n_z2)*(U_S*T_n_z3)*P_bottom_flexure
# Error in position of the tool's contact point relative to the shaft end
P_deflection_zdrive := P_zdrive_f - P_zdrive_0 = [-3.15685e-8 m; 3.50559e-6 m; -3.47787e-6 m; 0]
# Summary Calculations - Cross-Slide
# Nominal geometry of the part's tip
P_end := [0 m; 0; 0; 1]
# Actual position of the tool's contact point relative to the shaft end
P_tool_f_cross_slide := H_flexure*H_toolpost*H_tool*P_end = [0.00232512 m; 0.0343396 m; 3.22052e-5 m; 1]
# Nominal position of the tool's contact point relative to the shaft end
P_tool_0_cross_slide := (U_S*T_n_flexure*U_S*T_n_toolpost*U_S*T_n_tool*P_end) = [0.00236 m; 0.034417 m; 0 m; 1]
# Error in position of the tool's contact point relative to the shaft end
P_deflection_cross_slide := P_tool_f_cross_slide - P_tool_0_cross_slide = [-34.8767; -77.4499; 32.2052; 0 1/m] μm
# Summary Calculations - Stick #1 - The Spindle path
# Nominal geometry of the part's tip
P_tool := [-D_part/2; 0; 0; 1] = [-0.015 m; 0 m; 0 m; 1]
# Actual position of the tool's contact point relative to the shaft end
P_tool_f_spindle := H_hs*H_housing*H_bearing*H_spindle*H_ef*H_fp*P_tool = [-0.0149922 m; 0.147722 m; 0.0679833 m; 1]
# Nominal position of the tool's contact point relative to the shaft end
P_tool_0_spindle := (U_S*T_n_hs*U_S*T_n_ef*U_S*T_n_fp*P_tool) = [-0.015 m; 0.147638 m; 0.068 m; 1]
# Error in position of the tool's contact point relative to the base of the flexure
P_stick1 := P_tool_f_spindle - P_tool_0_spindle = [7.75777; 84.8916; -16.6814; 0 1/m] μm
# Summary Calculations - Stick #2 - base to tool
# Nominal geometry of the part's tip
P_end := [0 m; 0; 0; 1]
# Actual position of the tool's contact point relative to the shaft end
P_tool_f_cross_slide := H_z1*H_z2*H_z3*H_flexure*H_toolpost*H_tool*P_end = [0.00234503 m; 0.149035 m; 0.093427 m; 1]
# Nominal position of the tool's contact point relative to the shaft end
P_tool_0_cross_slide := ((U_S*T_n_z1)*(U_S*T_n_z2)*(U_S*T_n_z3)*U_S*T_n_flexure*U_S*T_n_toolpost*U_S*T_n_tool*P_end) = [0.00236 m; 0.149111 m; 0.0934 m; 1]
# Error in position of the tool's contact point relative to the shaft end
P_stick2 := P_tool_f_cross_slide - P_tool_0_cross_slide = [-14.9681; -75.2928; 26.982; 0 1/m] μm
# Total Deflection from Tool Point to Cutting Point
P_deflection_spindle = [7.75777; 80.2982; -10.0264; 0 1/m] μm
P_deflection_cross_slide = [-34.8767; -77.4499; 32.2052; 0 1/m] μm
P_deflection_hs = [0; 0; -6.64955; 0 1/m] μm
P_deflection_zdrive = [-0.0315685; 3.50559; -3.47787; 0] μm
P_stick1 = [7.75777; 84.8916; -16.6814; 0 1/m] μm
P_stick2 = [-14.9681; -75.2928; 26.982; 0 1/m] μm
P_deflection_total := P_stick1 - P_stick2 = [22.7259; 160.184; -43.6634; 0 1/m] μm
δ_R := sqrt((P_deflection_total[0] + D_part/2)^2 + P_deflection_total[1]^2) - D_part/2 = 23.5799 μm
δ_z := -P_deflection_total[2] = 43.6634 μm
