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# Spindle Model - Take 2
# Non-Spindle Shaft Dimensions
D_bearing_inner := 0.75 in
D_chuck := 2 cm
D_part := 40 mm
L_part := 5 cm
L_shim := 3.175 mm
A_shim := 4.65*cm^2
# Applied Forces
F_cut_x := 10 N
F_cut_y := 115 N
F_feed_z := -50 N
T_pulley := 3.45 N*m
F_preload := 50.102 N
F_t := 60 N
# Spindle Shaft Dimensions
L_ef := 18 mm
L_de := 46.12 mm
L_cd := 50 mm
L_bc := 29.54 mm
L_ab := 16.30 mm
D_ef := D_chuck
D_de := D_bearing_inner
D_cd := 1 in
D_bc := D_bearing_inner
D_ab := D_bc
L_total := L_ef + L_de + L_cd + L_bc + L_ab = 159.96 mm
a_bearing := 5.6 mm
L_a := L_ab + L_bc + a_bearing
L_b := L_ab + L_bc + L_cd - a_bearing
# Calculate Bearing Forces
# Forces on Bearing A (Pulley Side)
R_a_y := (F_cut_y*(L_part + L_total - L_a) - F_t*L_a)/(L_b - L_a) - F_t - F_cut_y = 215.294 N
R_a_x := (F_cut_x*(L_part + L_total - L_a) + F_feed_z*D_part/2)/(L_b - L_a) - F_cut_x
R_a_z := -F_feed_z + F_preload
# Forces on Bearing B (Chuck Side)
R_b_x := -(F_cut_x*(L_part + L_total - L_a) + F_feed_z*D_part/2)/(L_b - L_a) = -15.0825 N
R_b_y := -(F_cut_y*(L_part + L_total - L_a) - F_t*L_a)/(L_b - L_a) = -390.294 N
R_b_z := -F_preload
# Resistive Moment
M_r := (L_cd + (L_bc/2) + (L_de/2))*(R_a_y - R_b_y)
# Material Properties
E := 200 GPa
E_part := 200 GPa
G := 80 GPa
G_part := 80 GPa
# Bearing and Shim Stiffnesses
K_b := 5 N/μm
k_shim := E*A_shim/L_shim
k_bolts := 6*(472.081 N/μm)
k_washers := 5*0.047*N/μm
# HTMS - Segment FP (Part)
I_fp := π*D_part^4/64
J_fp := π*D_part^4/32
A_fp := π*D_part^2/2
U_S := [1, 0, 0, 0; 0, 1, 0, 0; 0, 0, 1, 0; 0*m^-1, 0 m^-1, 0 m^-1, 1 m^-1]
# Nominal geometry
T_n_fp := [1, 0, 0, 0 m; 0, 1, 0, 0 m; 0, 0, 1, L_part; 0, 0, 0, 1*m]
# Translation errors
T_z_fp := [1, 0, 0, 0*m; 0, 1, 0, 0*m; 0, 0, 1, F_feed_z*L_part/(E_part*A_fp); 0, 0, 0, 1*m]
T_y_fp := [1, 0, 0, 0*m; 0, 1, 0, F_cut_y*L_part^3/(3*E_part*I_fp); 0, 0, 1, 0*m; 0, 0, 0, 1*m]
T_x_fp := [1, 0, 0, F_cut_x*L_part^3/(3*E_part*I_fp); 0, 1, 0, 0*m; 0, 0, 1, 0*m; 0, 0, 0, 1*m]
# Rotation errors
R_z_fp := [
    1, F_cut_y*D_part/2*L_part/(J_fp*G_part), 0, 0*m;
    -F_cut_y*D_part/2*L_part/(J_fp*G_part), 1, 0, 0*m;
    0, 0, 1, 0*m;
    0, 0, 0, 1*m
]
R_x_fp := [
    1, 0, 0, 0*m;
    0, 1, F_cut_y*L_part^2/(2*E_part*I_fp), 0*m;
    0, -(F_cut_y*L_part^2/(2*E_part*I_fp)), 1, 0*m;
    0, 0, 0, 1*m
]
R_y_fp := [
    1, 0, F_cut_x*L_part^2/(2*E_part*I_fp) - F_feed_z*D_part/2*L_part/(E_part*I_fp), 0*m;
    0, 1, 0, 0*m;
    -(F_cut_x*L_part^2/(2*E_part*I_fp) - F_feed_z*D_part/2*L_part/(E_part*I_fp)), 0, 1, 0*m;
    0, 0, 0, 1*m
]
# Actual Position
T_fp := (U_S*T_n_fp)*U_S*T_x_fp*U_S*T_y_fp*U_S*T_z_fp
R_fp := (U_S*R_x_fp)*(U_S*R_y_fp)*(U_S*R_z_fp)
H_fp := T_fp*R_fp
# HTMs - Segment EF (Chuck Mount)
I_ef := π*D_ef^4/64
J_ef := π*D_ef^4/32
A_ef := π*D_ef^2/2
# Local Forces
F_z_ef := F_feed_z
F_y_ef := F_cut_y
F_x_ef := F_cut_x
M_z_ef := -F_cut_y*D_part/2
M_y_ef := F_cut_x*L_part - F_feed_z*D_part/2
M_x_ef := F_cut_y*L_part
# Nominal geometry
T_n_ef := [1, 0, 0, 0*m; 0, 1, 0, 0*m; 0, 0, 1, L_ef; 0, 0, 0, 1*m]
# Translation errors
T_z_ef := [1, 0, 0, 0*m; 0, 1, 0, 0*m; 0, 0, 1, F_z_ef*L_ef/(A_ef*E); 0, 0, 0, 1*m]
T_y_ef := [
    1, 0, 0, 0*m;
    0, 1, 0, M_x_ef*L_ef^2/(2*E*I_ef) + F_y_ef*L_ef^3/(3*E*I_ef);
    0, 0, 1, 0*m;
    0, 0, 0, 1*m
]
T_x_ef := [
    1, 0, 0, M_y_ef*L_ef^2/(2*E*I_ef) + F_x_ef*L_ef^3/(3*E*I_ef);
    0, 1, 0, 0*m;
    0, 0, 1, 0*m;
    0, 0, 0, 1*m
]
# Rotation errors
R_z_ef := [1, -(M_z_ef*L_ef/(J_ef*G)), 0, 0*m; M_z_ef*L_ef/(J_ef*G), 1, 0, 0*m; 0, 0, 1, 0*m; 0, 0, 0, 1*m]
R_x_ef := [
    1, 0, 0, 0*m;
    0, 1, M_x_ef*L_ef/(E*I_ef) + F_y_ef*L_ef^2/(2*E*I_ef), 0*m;
    0, -(M_x_ef*L_ef/(E*I_ef) + F_y_ef*L_ef^2/(2*E*I_ef)), 1, 0*m;
    0, 0, 0, 1*m
]
R_y_ef := [
    1, 0, M_y_ef*L_ef/(E*I_ef) + F_x_ef*L_ef^2/(2*E*I_ef), 0*m;
    0, 1, 0, 0*m;
    -(M_y_ef*L_ef/(E*I_ef) + F_x_ef*L_ef^2/(2*E*I_ef)), 0, 1, 0*m;
    0, 0, 0, 1*m
]
# Actual Position
T_ef := U_S*T_n_ef*U_S*T_x_ef*U_S*T_y_ef*U_S*T_z_ef
R_ef := U_S*R_x_ef*U_S*R_y_ef*U_S*R_z_ef
H_ef := T_ef*R_ef
# Spindle HTMs
# Key Dimensions
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L_ab_bearing := L_b - L_a
L_pp := L_ef + L_part
L_ap := L_ab_bearing + a_bearing + L_de
L_bp := a_bearing + L_de
L_bpp := L_bp + L_pp
# Bending x (Assuming simply supported beam)
# Forces and Moments
F := F_cut_x
R_xb := -F - F*L_bpp/L_ab
# Translation and Rotation
v_x_bend := F*L_bpp*L_ab_bearing^2/(6*E*I_ef) + F*L_pp*L_bp^2/(2*E*I_ef) + F*L_bp^3/(3*E*I_ef)
θ_y_bend := F*L_pp*L_bp/(E*I_ef) + F*L_bp^2/(2*E*I_ef) + F*L_bpp*L_ab_bearing/(6*E*I_ef)
# HTMs
T_x_beam := [1, 0, 0, v_x_bend; 0, 1, 0, 0*m; 0, 0, 1, 0*m; 0, 0, 0, 1*m] = [1, 0, 0, 1.06381e-6 m; 0, 1, 0, 0 m; 0, 0, 1, 0 m; 0, 0, 0, 1 m]
R_y_beam := [1, 0, θ_y_bend, 0*m; 0, 1, 0, 0*m; -θ_y_bend, 0, 1, 0*m; 0, 0, 0, 1*m] = [1, 0, 3.5833e-5, 0 m; 0, 1, 0, 0 m; -3.5833e-5, 0, 1, 0 m; 0, 0, 0, 1 m]
# Bending y
# Forces and Moments
M_a := F_t*L_a
M_b := F_cut_y*L_bpp
M_h := F_cut_y*L_bp
# Translation and Rotation
v_y_bend := (M_a*L_ab/(6*E*I_ef) + M_b*L_ab_bearing/(6*E*I_ef))*L_bp + M_h*L_bp^2/(2*E*I_ef)
θ_x_bend := M_a*L_ab/(6*E*I_ef) + M_b*L_ab_bearing/(2*E*I_ef) + M_h*L_bp/(E*I_ef)
# HTMs
T_y_beam := [1, 0, 0, 0*m; 0, 1, 0, v_y_bend; 0, 0, 1, 0*m; 0, 0, 0, 1*m] = [1, 0, 0, 0 m; 0, 1, 0, 8.27188e-6 m; 0, 0, 1, 0 m; 0, 0, 0, 1 m]
R_x_beam := [1, 0, 0, 0*m; 0, 1, θ_x_bend, 0*m; 0, -θ_x_bend, 1, 0*m; 0, 0, 0, 1*m] = [1, 0, 0, 0 m; 0, 1, 0.000371213, 0 m; 0, -0.000371213, 1, 0 m; 0, 0, 0, 1 m]
# Compression z
# Key Dimensions
L_op := L_ab_bearing
# Stiffness Equivalence
k_shaft := (L_op/(E*A_ef))^-1 = 3238.76 N/μm
# Under Preload | Under Feed Load
k_equiv_preload := 1/(1/k_shaft + 1/K_b + 1/K_b + 1/k_shim + 1/k_bolts)
k_equiv_feed := k_equiv_preload + 1/(1/k_washers + 1/K_b)
# Translations and Rotation
δ_feed := F_feed_z/k_equiv_feed = -18.3816 μm
δ_pre := F_preload/k_equiv_preload = 20.0757 μm
θ_z_tor := M_z_ef*L_ap/(J_ef*G)
# HTMs
T_z_beam := [1, 0, 0, 0*m; 0, 1, 0, 0*m; 0, 0, 1, (δ_pre + δ_feed); 0, 0, 0, 1*m] = [1, 0, 0, 0 m; 0, 1, 0, 0 m; 0, 0, 1, 1.69405e-6 m; 0, 0, 0, 1 m]
R_z_beam := [1, -θ_z_tor, 0, 0*m; θ_z_tor, 1, 0, 0*m; 0, 0, 1, 0*m; 0, 0, 0, 1*m] = [1, 0.000165677, 0, 0 m; -0.000165677, 1, 0, 0 m; 0, 0, 1, 0 m; 0, 0, 0, 1 m]
# Actual Position
T_spindle := U_S*T_x_beam*U_S*T_y_beam*U_S*T_z_beam
R_spindle := U_S*R_x_beam*U_S*R_y_beam*U_S*R_z_beam
H_spindle := T_spindle*R_spindle
# Bearing HTMs
# Bearing deflections and rotations
δ_x_bearing := (R_a_x + R_b_x)/(2*K_b)
δ_y_bearing := (R_a_y + R_b_y)/(2*K_b)
θ_x := (R_a_y + R_b_y)/(L_ab_bearing*K_b)
θ_y := (R_a_x + R_b_x)/(L_ab_bearing*K_b)
# Translation errors
T_x_bearing := [1, 0, 0, δ_x_bearing; 0, 1, 0, 0*m; 0, 0, 1, 0*m; 0, 0, 0, 1*m] = [1, 0, 0, -1e-6 m; 0, 1, 0, 0 m; 0, 0, 1, 0 m; 0, 0, 0, 1 m]
T_y_bearing := [1, 0, 0, 0*m; 0, 1, 0, δ_y_bearing; 0, 0, 1, 0*m; 0, 0, 0, 1*m] = [1, 0, 0, 0 m; 0, 1, 0, -1.75e-5 m; 0, 0, 1, 0 m; 0, 0, 0, 1 m]
# Rotation errors
R_x_bearing := [1, 0, 0, 0*m; 0, 1, θ_x, 0*m; 0, -θ_x, 1, 0*m; 0, 0, 0, 1*m] = [1, 0, 0, 0 m; 0, 1, -0.000902062, 0 m; 0, 0.000902062, 1, 0 m; 0, 0, 0, 1 m]
R_y_bearing := [1, 0, θ_y, 0*m; 0, 1, 0, 0*m; -θ_y, 0, 1, 0*m; 0, 0, 0, 1*m] = [1, 0, -5.15464e-5, 0 m; 0, 1, 0, 0 m; 5.15464e-5, 0, 1, 0 m; 0, 0, 0, 1 m]
# Actual Position
T_bearing := U_S*T_x_bearing*U_S*T_y_bearing
R_bearing := U_S*R_x_bearing*U_S*R_y_bearing
H_bearing := T_bearing*R_bearing
# Summary Calculations
# Nominal geometry of the part's tip
P_tool := [-D_part/2; 0; 0; 1]
# Actual position of the tool's contact point relative to the shaft end
P_tool_f := H_bearing*H_spindle*H_ef*H_fp*P_tool = [-0.0199999 m; -3.64268e-5 m; 0.0680018 m; 1]
# Nominal position of the tool's contact point relative to the shaft end
P_tool_0 := (U_S*T_n_ef*U_S*T_n_fp*P_tool) = [-0.02 m; 0 m; 0.068 m; 1]
# Error in position of the tool's contact point relative to the shaft end
P_deflection := P_tool_f - P_tool_0 = [0.0907623; -36.4268; 1.81686; 0 1/m] μm
