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# Bearing Sizing
# Spindle Shaft Characteristics
# Applied Forces
F_feed_z_finish := 20 N
F_feed_z_rough := 40 N
F_cut_x := 20 N
F_cut_y_rough := 120 N
# Rotational Speed | Geometry Between Bearings
N_rot := 2500 rpm
D_cd := 1 in
L_cd := 50 mm
# Young's Modulus | Shaft Stiffness
E_s := 210 GPa
K_s := π*(D_cd/2)^2*E_s/L_cd = 2128.17 N/μm
# Allowable Deflection
δ_z := 50 μm
# Spindle Housing Characteristics
# Outer Diameter | Inner Diameter | Total Length
D_h_outer := 72 mm
D_h_inner := 45 mm
L_h := 93 mm
# Young's Modulus | Housing Stiffness
E_h := 69 GPa
K_h := π*((D_h_outer/2)^2 - (D_h_inner/2)^2)*E_h/L_h = 1840.8 N/μm
# Washers Characteristics (Wave washer)
# Working Load | Deflection @ Working Load | Washer Stiffness
P_w := 50 lbf = 0.222411 kN
δ_w := 0.187 in
K_w := P_w/δ_w = 0.0468254 N/μm
# Number of washers
N_w := 3
# Bearing Parameters (LM11949 - LM11910, Tapered Roller Bearings)
# ISO factors | Bearing Stiffness
e := 0.30
Y_2 := 2
K_b_static := 53 N/μm
# Dynamic Radial Rating (1 million revolutions)
C_1 := 39100 N
# Constants for Bearing Stiffness
a_stiffness := 5.58 N/μm
b_stiffness := 17.7 N/μm
# Bolt Characteristics (M6)
# Pitch Diameter | Clamped Length | Young's Modulus
D_bolt_pitch := 5.35 mm
L_bolt := 10 mm
E_bolt := 210 GPa  # I assumed same bolt geometry on both ends of the spindle housing.
# Bolt Stiffness | Outer Diameter
D_bolt_outer := 6 mm
K_bolt := π*(D_bolt_pitch/2)^2*E_bolt/L_bolt = 472.081 N/μm
# Bolt Location Diameter
D_b := 63.5 mm
# Number of bolts
N_bolts_min := ceil(π*D_b/(6*D_bolt_outer)) = 6
N_bolts_max := floor(π*D_b/(3*D_bolt_outer)) = 11
N_bolts_back := 6  # Should be between the two values above.
N_bolts_front := 4
# Preload calculation
# System Stiffness
K_system := F_feed_z_finish/δ_z
# Bearing Stiffness
a := ((K_system - K_w)*(K_h + K_s) - K_h*K_s)/(K_h*K_s*K_w) = -21.3483 μm/N
b := ((K_h*K_s + K_w*(K_h + K_s))*K_system - 2*K_w*K_h*K_s)/(K_w*K_h*K_s) = 6.54279
c := K_system
Δ := b^2 - 4*a*c = 76.9653
K_b :=
    if Δ > 0
        if (-b - sqrt(Δ))/(2*a) > 0
            (-b - sqrt(Δ))/(2*a)
        else
            (-b + sqrt(Δ))/(2*a)
    else if Δ == 0
        -b/(2*a)
    else
        0
    = 0.358712 N/μm
# Preload
F_preload_min := exp((K_b - b_stiffness)/a_stiffness)*1 N + F_feed_z_finish = 20.0447 N
# Bearing Forces
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# Preload
# Factor of Safety | Force
s := 2
F_preload := s*F_preload_min = 40.0894 N
# Loads during finishing pass
# Radial Load | Axial Load
F_r := sqrt(F_cut_x^2 + F_cut_y_rough^2) = 121.655 N
F_a_finish := F_preload + F_feed_z_finish = 60.0894 N
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# Dynamic Equivalent Radial Load
P_r_finish :=
    if F_a_finish/F_r ≤ e
        F_r
    else
        0.4*F_r + Y_2*F_a_finish
# Loads during roughing pass
# Radial Load | Axial Load
F_r := sqrt(F_cut_x^2 + F_cut_y_rough^2) = 121.655 N
F_a_rough := F_preload + F_feed_z_rough = 80.0894 N
# Dynamic Equivalent Radial Load
P_r_rough :=
    if F_a_rough/F_r ≤ e
        F_r
    else
        0.4*F_r + Y_2*F_a_rough
# Bearing Life
P_r_average := (P_r_finish + P_r_rough)/2
L_10 := (C_1/P_r_average)^(10/3)*(10^6/(60*N_rot)) = 928638 hr
# Woodworking Spindle Model
# Non-Spindle Shaft Dimensions
D_bearing_inner := 0.75 in
D_chuck := 2 cm
D_part := 60 mm
L_part := 127 mm
L_shim := 3.175 mm
A_shim := 4.65*cm^2
# Applied Forces
F_cut_x := 20 N
F_cut_y := 50 N
F_feed_z := -F_feed_z_finish
T_pulley := 3.45 N*m
F_t := 60 N
# Spindle Shaft Dimensions
L_ef := 18 mm
L_de := 46.12 mm
L_bc := 29.54 mm
L_ab := 16.30 mm
D_ef := D_chuck
D_de := D_bearing_inner
D_bc := D_bearing_inner
D_ab := D_bc
L_total := L_ef + L_de + L_cd + L_bc + L_ab = 159.96 mm
a_bearing := 5.6 mm
L_a := L_ab + L_bc + a_bearing
L_b := L_ab + L_bc + L_cd - a_bearing
# Calculate Bearing Forces
# Forces on Bearing A (Pulley Side)
R_a_y := (F_cut_y*(L_part + L_total - L_a) - F_t*L_a)/(L_b - L_a) - F_t - F_cut_y = 113.959 N
R_a_x := (F_cut_x*(L_part + L_total - L_a) + F_feed_z*D_part/2)/(L_b - L_a) - F_cut_x
R_a_z := -F_feed_z + F_preload
# Forces on Bearing B (Chuck Side)
R_b_x := -(F_cut_x*(L_part + L_total - L_a) + F_feed_z*D_part/2)/(L_b - L_a) = -105.938 N
R_b_y := -(F_cut_y*(L_part + L_total - L_a) - F_t*L_a)/(L_b - L_a) = -223.959 N
R_b_z := -F_preload
# Resistive Moment
M_r := (L_cd + (L_bc/2) + (L_de/2))*(R_a_y - R_b_y)
# Material Properties
E := 200 GPa
E_part := 10 GPa
G := 80 GPa
G_part := 1.5 GPa
# Shim, Bolts and Washers Stiffnesses
k_shim := E*A_shim/L_shim
k_bolts := 6*(472.081 N/μm)
k_washers := 5*0.047*N/μm
# HTMS - Segment FP (Part)
I_fp := π*D_part^4/64
J_fp := π*D_part^4/32
A_fp := π*D_part^2/2
U_S := [1, 0, 0, 0; 0, 1, 0, 0; 0, 0, 1, 0; 0*m^-1, 0 m^-1, 0 m^-1, 1 m^-1]
# Nominal geometry
T_n_fp := [1, 0, 0, 0 m; 0, 1, 0, 0 m; 0, 0, 1, L_part; 0, 0, 0, 1*m]
# Translation errors
T_z_fp := [1, 0, 0, 0*m; 0, 1, 0, 0*m; 0, 0, 1, F_feed_z*L_part/(E_part*A_fp); 0, 0, 0, 1*m]
T_y_fp := [1, 0, 0, 0*m; 0, 1, 0, F_cut_y*L_part^3/(3*E_part*I_fp); 0, 0, 1, 0*m; 0, 0, 0, 1*m]
T_x_fp := [1, 0, 0, F_cut_x*L_part^3/(3*E_part*I_fp); 0, 1, 0, 0*m; 0, 0, 1, 0*m; 0, 0, 0, 1*m]
# Rotation errors
R_z_fp := [
    1, F_cut_y*D_part/2*L_part/(J_fp*G_part), 0, 0*m;
    -F_cut_y*D_part/2*L_part/(J_fp*G_part), 1, 0, 0*m;
    0, 0, 1, 0*m;
    0, 0, 0, 1*m
]
R_x_fp := [
    1, 0, 0, 0*m;
    0, 1, F_cut_y*L_part^2/(2*E_part*I_fp), 0*m;
    0, -(F_cut_y*L_part^2/(2*E_part*I_fp)), 1, 0*m;
    0, 0, 0, 1*m
]
R_y_fp := [
    1, 0, F_cut_x*L_part^2/(2*E_part*I_fp) - F_feed_z*D_part/2*L_part/(E_part*I_fp), 0*m;
    0, 1, 0, 0*m;
    -(F_cut_x*L_part^2/(2*E_part*I_fp) - F_feed_z*D_part/2*L_part/(E_part*I_fp)), 0, 1, 0*m;
    0, 0, 0, 1*m
]
# Actual Position
T_fp := (U_S*T_n_fp)*U_S*T_x_fp*U_S*T_y_fp*U_S*T_z_fp
R_fp := (U_S*R_x_fp)*(U_S*R_y_fp)*(U_S*R_z_fp)
H_fp := T_fp*R_fp
# HTMs - Segment EF (Chuck Mount)
I_ef := π*D_ef^4/64
J_ef := π*D_ef^4/32
A_ef := π*D_ef^2/2
# Local Forces
F_z_ef := F_feed_z
F_y_ef := F_cut_y
F_x_ef := F_cut_x
M_z_ef := -F_cut_y*D_part/2
M_y_ef := F_cut_x*L_part - F_feed_z*D_part/2
M_x_ef := F_cut_y*L_part
# Nominal geometry
T_n_ef := [1, 0, 0, 0*m; 0, 1, 0, 0*m; 0, 0, 1, L_ef; 0, 0, 0, 1*m]
# Translation errors
T_z_ef := [1, 0, 0, 0*m; 0, 1, 0, 0*m; 0, 0, 1, F_z_ef*L_ef/(A_ef*E); 0, 0, 0, 1*m]
T_y_ef := [
    1, 0, 0, 0*m;
    0, 1, 0, M_x_ef*L_ef^2/(2*E*I_ef) + F_y_ef*L_ef^3/(3*E*I_ef);
    0, 0, 1, 0*m;
    0, 0, 0, 1*m
]
T_x_ef := [
    1, 0, 0, M_y_ef*L_ef^2/(2*E*I_ef) + F_x_ef*L_ef^3/(3*E*I_ef);
    0, 1, 0, 0*m;
    0, 0, 1, 0*m;
    0, 0, 0, 1*m
]
# Rotation errors
R_z_ef := [1, -(M_z_ef*L_ef/(J_ef*G)), 0, 0*m; M_z_ef*L_ef/(J_ef*G), 1, 0, 0*m; 0, 0, 1, 0*m; 0, 0, 0, 1*m]
R_x_ef := [
    1, 0, 0, 0*m;
    0, 1, M_x_ef*L_ef/(E*I_ef) + F_y_ef*L_ef^2/(2*E*I_ef), 0*m;
    0, -(M_x_ef*L_ef/(E*I_ef) + F_y_ef*L_ef^2/(2*E*I_ef)), 1, 0*m;
    0, 0, 0, 1*m
]
R_y_ef := [
    1, 0, M_y_ef*L_ef/(E*I_ef) + F_x_ef*L_ef^2/(2*E*I_ef), 0*m;
    0, 1, 0, 0*m;
    -(M_y_ef*L_ef/(E*I_ef) + F_x_ef*L_ef^2/(2*E*I_ef)), 0, 1, 0*m;
    0, 0, 0, 1*m
]
# Actual Position
T_ef := U_S*T_n_ef*U_S*T_x_ef*U_S*T_y_ef*U_S*T_z_ef
R_ef := U_S*R_x_ef*U_S*R_y_ef*U_S*R_z_ef
H_ef := T_ef*R_ef
# Spindle HTMs
# Key Dimensions
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L_ab_bearing := L_b - L_a
L_pp := L_ef + L_part
L_ap := L_ab_bearing + a_bearing + L_de
L_bp := a_bearing + L_de
L_bpp := L_bp + L_pp
# Bending x (Assuming simply supported beam)
# Forces and Moments
F := F_cut_x
R_xb := -F - F*L_bpp/L_ab
# Translation and Rotation
v_x_bend := F*L_bpp*L_ab_bearing^2/(6*E*I_ef) + F*L_pp*L_bp^2/(2*E*I_ef) + F*L_bp^3/(3*E*I_ef)
θ_y_bend := F*L_pp*L_bp/(E*I_ef) + F*L_bp^2/(2*E*I_ef) + F*L_bpp*L_ab_bearing/(6*E*I_ef)
# HTMs
T_x_beam := [1, 0, 0, v_x_bend; 0, 1, 0, 0*m; 0, 0, 1, 0*m; 0, 0, 0, 1*m] = [1, 0, 0, 3.68487e-6 m; 0, 1, 0, 0 m; 0, 0, 1, 0 m; 0, 0, 0, 1 m]
R_y_beam := [1, 0, θ_y_bend, 0*m; 0, 1, 0, 0*m; -θ_y_bend, 0, 1, 0*m; 0, 0, 0, 1*m] = [1, 0, 0.000128712, 0 m; 0, 1, 0, 0 m; -0.000128712, 0, 1, 0 m; 0, 0, 0, 1 m]
# Bending y
# Forces and Moments
M_a := F_t*L_a
M_b := F_cut_y*L_bpp
M_h := F_cut_y*L_bp
# Translation and Rotation
v_y_bend := (M_a*L_ab/(6*E*I_ef) + M_b*L_ab_bearing/(6*E*I_ef))*L_bp + M_h*L_bp^2/(2*E*I_ef)
θ_x_bend := M_a*L_ab/(6*E*I_ef) + M_b*L_ab_bearing/(2*E*I_ef) + M_h*L_bp/(E*I_ef)
# HTMs
T_y_beam := [1, 0, 0, 0*m; 0, 1, 0, v_y_bend; 0, 0, 1, 0*m; 0, 0, 0, 1*m] = [1, 0, 0, 0 m; 0, 1, 0, 4.57226e-6 m; 0, 0, 1, 0 m; 0, 0, 0, 1 m]
R_x_beam := [1, 0, 0, 0*m; 0, 1, θ_x_bend, 0*m; 0, -θ_x_bend, 1, 0*m; 0, 0, 0, 1*m] = [1, 0, 0, 0 m; 0, 1, 0.000211963, 0 m; 0, -0.000211963, 1, 0 m; 0, 0, 0, 1 m]
# Compression z
# Key Dimensions
L_op := L_ab_bearing
# Stiffness Equivalence
k_shaft := (L_op/(E*A_ef))^-1 = 3238.76 N/μm
# Under Preload | Under Feed Load
k_equiv_preload := 1/(1/k_shaft + 1/K_b + 1/K_b + 1/k_shim + 1/k_bolts)
k_equiv_feed := k_equiv_preload + 1/(1/k_washers + 1/K_b)
# Translations and Rotation
δ_feed := F_feed_z/k_equiv_feed = -62.2438 μm
δ_pre := F_preload/k_equiv_preload = 223.547 μm
θ_z_tor := M_z_ef*L_ap/(J_ef*G)
# HTMs
T_z_beam := [1, 0, 0, 0*m; 0, 1, 0, 0*m; 0, 0, 1, (δ_pre + δ_feed); 0, 0, 0, 1*m] = [1, 0, 0, 0 m; 0, 1, 0, 0 m; 0, 0, 1, 0.000161303 m; 0, 0, 0, 1 m]
R_z_beam := [1, -θ_z_tor, 0, 0*m; θ_z_tor, 1, 0, 0*m; 0, 0, 1, 0*m; 0, 0, 0, 1*m] = [1, 0.00010805, 0, 0 m; -0.00010805, 1, 0, 0 m; 0, 0, 1, 0 m; 0, 0, 0, 1 m]
# Actual Position
T_spindle := U_S*T_x_beam*U_S*T_y_beam*U_S*T_z_beam
R_spindle := U_S*R_x_beam*U_S*R_y_beam*U_S*R_z_beam
H_spindle := T_spindle*R_spindle
# Bearing HTMs
# Bearing deflections and rotations
δ_x_bearing := (R_a_x + R_b_x)/(2*K_b)
δ_y_bearing := (R_a_y + R_b_y)/(2*K_b)
θ_x := (R_a_y + R_b_y)/(L_ab_bearing*K_b)
θ_y := (R_a_x + R_b_x)/(L_ab_bearing*K_b)
# Translation errors
T_x_bearing := [1, 0, 0, δ_x_bearing; 0, 1, 0, 0*m; 0, 0, 1, 0*m; 0, 0, 0, 1*m] = [1, 0, 0, -2.78775e-5 m; 0, 1, 0, 0 m; 0, 0, 1, 0 m; 0, 0, 0, 1 m]
T_y_bearing := [1, 0, 0, 0*m; 0, 1, 0, δ_y_bearing; 0, 0, 1, 0*m; 0, 0, 0, 1*m] = [1, 0, 0, 0 m; 0, 1, 0, -0.000153326 m; 0, 0, 1, 0 m; 0, 0, 0, 1 m]
# Rotation errors
R_x_bearing := [1, 0, 0, 0*m; 0, 1, θ_x, 0*m; 0, -θ_x, 1, 0*m; 0, 0, 0, 1*m] = [1, 0, 0, 0 m; 0, 1, -0.00790343, 0 m; 0, 0.00790343, 1, 0 m; 0, 0, 0, 1 m]
R_y_bearing := [1, 0, θ_y, 0*m; 0, 1, 0, 0*m; -θ_y, 0, 1, 0*m; 0, 0, 0, 1*m] = [1, 0, -0.00143699, 0 m; 0, 1, 0, 0 m; 0.00143699, 0, 1, 0 m; 0, 0, 0, 1 m]
# Actual Position
T_bearing := U_S*T_x_bearing*U_S*T_y_bearing
R_bearing := U_S*R_x_bearing*U_S*R_y_bearing
H_bearing := T_bearing*R_bearing
# Summary Calculations
# Nominal geometry of the part's tip
P_tool := [-D_part/2; 0; 0; 1]
# Actual position of the tool's contact point relative to the shaft end
P_tool_f := H_bearing*H_spindle*H_ef*H_fp*P_tool = [-0.0302068 m; -0.00124214 m; 0.145125 m; 1]
# Nominal position of the tool's contact point relative to the shaft end
P_tool_0 := (U_S*T_n_ef*U_S*T_n_fp*P_tool) = [-0.03 m; 0 m; 0.145 m; 1]
# Error in position of the tool's contact point relative to the shaft end
P_deflection := P_tool_f - P_tool_0 = [-206.804; -1242.14; 124.764; 0 1/m] μm
