# Spindle Position Error
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# Assumptions:
# - Fixed Bearings
# - Perfect Turning about Z
# L_part is the length of the part from the end of the chuck
# Non-Spindle Shaft Dimensions
D_bearing_inner := 0.75 in
D_chuck := 1.4 cm
D_part := 40 mm
L_part := 5 cm
# Applied Forces
F_cut_x := 10 N
F_cut_y := 115 N
F_feed_z := -50 N
T_pulley := 3.45 N*m
F_preload := 314 N
F_t := 60 N
M_resist := -0.01*F_preload*D_bearing_inner/2
# Spindle Shaft Dimensions
L_ef := 2.35 cm
L_de := 1.66 cm
L_cd := 2 cm
L_bc := 1.66 cm
L_ab := 1 cm
D_ef := D_chuck
D_de := D_bearing_inner
D_cd := 5 cm
D_bc := D_bearing_inner
D_ab := 0.75 in
L.total := L_ef + L_de + L_cd + L_bc + L_ab = 3.41339 in
a_bearing := 5.6 mm
L_a := L_ab + L_bc + a_bearing
L_b := L_ab + L_bc + L_cd - a_bearing
# Calculate Bearing Forces
R_a_y := (F_cut_y*(L_part + L.total - L_a) - F_t*L_a)/(L_b - L_a) - F_t - F_cut_y = 971.08 N
R_b_y := -(F_cut_y*(L_part + L.total - L_a) - F_t*L_a)/(L_b - L_a) = -1146.08 N
L_part + L_total
R_a_x := (F_cut_x*(L_part + L.total - L_a) + F_feed_z*D_part/2)/(L_b - L_a) - F_cut_x
R_b_x := -(F_cut_x*(L_part + L.total - L_a) + F_feed_z*D_part/2)/(L_b - L_a) = -5.11364 N
R_a_y/(R_b_y + R_a_y) = -5.54903
R_b_z := -F_preload
M_mot := F_cut_y*D_part/2 + M_resist
M_r := (L_cd + (L_bc/2) + (L_de/2))*(R_a_y - R_b_y)
R_a_z := -F_feed_z + F_preload
# Material Properties - 12L14 and Bearing Stiffness
E := 200 GPa
E_part := 200 GPa
K_b := 32.239 N/μm
G := 80 GPa
G_part := 80 GPa
# HTMS - FP
I_fp := π*D_part^4/64
J_fp := π*D_part^4/32
A_fp := π*D_part^2/2
U_S := [1, 0, 0, 0; 0, 1, 0, 0; 0, 0, 1, 0; 0*m^-1, 0 m^-1, 0 m^-1, 1 m^-1]
# Nominal geometry
T_n_fp := [1, 0, 0, 0 m; 0, 1, 0, 0 m; 0, 0, 1, L_part; 0, 0, 0, 1*m]
# Translation errors
T_z_fp := [1, 0, 0, 0*m; 0, 1, 0, 0*m; 0, 0, 1, F_feed_z*L_part/(E_part*A_fp); 0, 0, 0, 1*m]
T_y_fp := [1, 0, 0, 0*m; 0, 1, 0, F_cut_y*L_part^3/(3*E_part*I_fp); 0, 0, 1, 0*m; 0, 0, 0, 1*m]
T_x_fp := [1, 0, 0, F_cut_x*L_part^3/(3*E_part*I_fp); 0, 1, 0, 0*m; 0, 0, 1, 0*m; 0, 0, 0, 1*m]
# Rotation errors
R_z_fp := [
    1, F_cut_y*D_part/2*L_part/(J_fp*G_part), 0, 0*m;
    -F_cut_y*D_part/2*L_part/(J_fp*G_part), 1, 0, 0*m;
    0, 0, 1, 0*m;
    0, 0, 0, 1*m
] = [1, 5.71963e-6, 0, 0 m; -5.71963e-6, 1, 0, 0 m; 0, 0, 1, 0 m; 0, 0, 0, 1 m]
R_x_fp := [
    1, 0, 0, 0*m;
    0, 1, F_cut_y*L_part^2/(2*E_part*I_fp), 0*m;
    0, -(F_cut_y*L_part^2/(2*E_part*I_fp)), 1, 0*m;
    0, 0, 0, 1*m
] = [1, 0, 0, 0 m; 0, 1, 5.71963e-6, 0 m; 0, -5.71963e-6, 1, 0 m; 0, 0, 0, 1 m]
R_y_fp := [
    1, 0, F_cut_x*L_part^2/(2*E_part*I_fp), 0*m;
    0, 1, 0, 0*m;
    -(F_cut_x*L_part^2/(2*E_part*I_fp)), 0, 1, 0*m;
    0, 0, 0, 1*m
] = [1, 0, 4.97359e-7, 0 m; 0, 1, 0, 0 m; -4.97359e-7, 0, 1, 0 m; 0, 0, 0, 1 m]
# Actual Position
T_fp := (U_S*T_n_fp)*U_S*T_x_fp*U_S*T_y_fp*U_S*T_z_fp
I := [1 m; 1 m; 1 m; 1 m]
R_fp := (U_S*R_x_fp)*(U_S*R_y_fp)*(U_S*R_z_fp)
R_fp*U_S*I - U_S*I = [6.21699e-6 m; -2.84472e-12 m; -6.21696e-6 m; 0]
H_fp := T_fp*R_fp
# Segment EF
I_ef := π*D_ef^4/64
J_ef := π*D_ef^4/32
A_ef := π*D_ef^2/2
# Local Forces
F_z_ef := F_feed_z
F_y_ef := F_cut_y
F_x_ef := F_cut_x
M_z_ef := -F_cut_y*D_part/2
M_y_ef := F_cut_x*L_part
M_x_ef := F_cut_y*L_part
# Nominal geometry
T_n_ef := [1, 0, 0, 0*m; 0, 1, 0, 0*m; 0, 0, 1, L_ef; 0, 0, 0, 1*m]
# Translation errors
T_z_ef := [1, 0, 0, 0*m; 0, 1, 0, 0*m; 0, 0, 1, F_z_ef*L_ef/(A_ef*E); 0, 0, 0, 1*m]
T_y_ef := [
    1, 0, 0, 0*m;
    0, 1, 0, M_x_ef*L_ef^2/(2*E*I_ef) + F_y_ef*L_ef^3/(3*E*I_ef);
    0, 0, 1, 0*m;
    0, 0, 0, 1*m
]
T_x_ef := [
    1, 0, 0, M_y_ef*L_ef^2/(2*E*I_ef) + F_x_ef*L_ef^3/(3*E*I_ef);
    0, 1, 0, 0*m;
    0, 0, 1, 0*m;
    0, 0, 0, 1*m
]
# Rotation errors
R_z_ef := [1, -(M_z_ef*L_ef/(J_ef*G)), 0, 0*m; M_z_ef*L_ef/(J_ef*G), 1, 0, 0*m; 0, 0, 1, 0*m; 0, 0, 0, 1*m] = [1, 0.00017914, 0, 0 m; -0.00017914, 1, 0, 0 m; 0, 0, 1, 0 m; 0, 0, 0, 1 m]
R_x_ef := [
    1, 0, 0, 0*m;
    0, 1, M_x_ef*L_ef/(E*I_ef) + F_y_ef*L_ef^2/(2*E*I_ef), 0*m;
    0, -(M_x_ef*L_ef/(E*I_ef) + F_y_ef*L_ef^2/(2*E*I_ef)), 1, 0*m;
    0, 0, 0, 1*m
] = [1, 0, 0, 0 m; 0, 1, 0.000442477, 0 m; 0, -0.000442477, 1, 0 m; 0, 0, 0, 1 m]
R_y_ef := [
    1, 0, M_y_ef*L_ef/(E*I_ef) + F_x_ef*L_ef^2/(2*E*I_ef), 0*m;
    0, 1, 0, 0*m;
    -(M_y_ef*L_ef/(E*I_ef) + F_x_ef*L_ef^2/(2*E*I_ef)), 0, 1, 0*m;
    0, 0, 0, 1*m
] = [1, 0, 3.84763e-5, 0 m; 0, 1, 0, 0 m; -3.84763e-5, 0, 1, 0 m; 0, 0, 0, 1 m]
# Actual Position
T_ef := U_S*T_n_ef*U_S*T_x_ef*U_S*T_y_ef*U_S*T_z_ef
R_ef := U_S*R_x_ef*U_S*R_y_ef*U_S*R_z_ef
R_ef*U_S*I - U_S*I = [0.000217617 m; 0.000263319 m; -0.000480881 m; 0]
H_ef := T_ef*R_ef
# Segment DE
I_de := π*D_de^4/64
J_de := π*D_de^4/32
A_de := π*D_de^2/2
# Local Forces
F_z_de := F_feed_z
F_y_de := F_cut_y
F_x_de := F_cut_x
M_z_de := -F_cut_y*D_part/2
M_y_de := F_cut_x*(L_part + L_ef)
M_x_de := F_cut_y*(L_part + L_ef)
# Nominal geometry
T_n_de := [1, 0, 0, 0*m; 0, 1, 0, 0*m; 0, 0, 1, L_de; 0, 0, 0, 1*m]
# Translation errors
T_z_de := [1, 0, 0, 0*m; 0, 1, 0, 0*m; 0, 0, 1, F_z_de*L_de/(A_de*E); 0, 0, 0, 1*m]
T_y_de := [
    1, 0, 0, 0*m;
    0, 1, 0, M_x_de*L_de^2/(2*E*I_de) + F_y_de*L_de^3/(3*E*I_de) + 5*R_b_y*(L_de/2)^3/(2*3*E*I_de);
    0, 0, 1, 0*m;
    0, 0, 0, 1*m
]
T_x_de := [
    1, 0, 0, M_y_de*L_de^2/(2*E*I_de) + F_x_de*L_de^3/(3*E*I_de) + 5*R_b_x*(L_de/2)^3/(2*3*E*I_de);
    0, 1, 0, 0*m;
    0, 0, 1, 0*m;
    0, 0, 0, 1*m
]
# Rotation errors
R_z_de := [1, -(M_z_de*L_de/(J_de*G)), 0, 0*m; M_z_de*L_de/(J_de*G), 1, 0, 0*m; 0, 0, 1, 0*m; 0, 0, 0, 1*m]
R_x_de := [
    1, 0, 0, 0*m;
    0, 1, M_x_de*L_de/(E*I_de) + F_y_de*L_de^2/(2*E*I_de) + R_b_y*(L_de/2)^2/(2*E*I_de), 0*m;
    0, -(M_x_de*L_de/(E*I_de) + F_y_de*L_de^2/(2*E*I_de) + R_b_y*(L_de/2)^2/(2*E*I_de)), 1, 0*m;
    0, 0, 0, 1*m
]
R_y_de := [
    1, 0, M_y_de*L_de/(E*I_de) + F_x_de*L_de^2/(2*E*I_de) + R_b_x*(L_de/2)^2/(2*E*I_de), 0*m;
    0, 1, 0, 0*m;
    -(M_y_de*L_de/(E*I_de) + F_x_de*L_de^2/(2*E*I_de) + R_b_x*(L_de/2)^2/(2*E*I_de)), 0, 1, 0*m;
    0, 0, 0, 1*m
]
# Actual Position
T_de := U_S*T_n_de*U_S*T_x_de*U_S*T_y_de*U_S*T_z_de
R_de := U_S*R_x_de*U_S*R_y_de*U_S*R_z_de
R_de*U_S*I - U_S*I = [4.72779e-5 m; 5.33304e-5 m; -0.000100606 m; 0]
H_de := T_de*R_de
# Segment CD/2
I_cd := π*D_cd^4/64
J_cd := π*D_cd^4/32
A_cd := π*D_cd^2/2
# Local Forces
F_z_cd := F_feed_z
F_y_cd := F_cut_y + R_b_y
F_x_cd := F_cut_x + R_b_x
M_z_cd := -F_cut_y*D_part/2
M_y_cd := F_cut_x*(L_part + L_ef + L_de) + R_b_x*L_de/2
M_x_cd := F_cut_y*(L_part + L_ef + L_de) + R_b_y*L_de/2
# Nominal geometry
T_n_cd := [1, 0, 0, 0*m; 0, 1, 0, 0*m; 0, 0, 1, L_cd/2; 0, 0, 0, 1*m]
# Translation errors
T_z_cd := [1, 0, 0, 0*m; 0, 1, 0, 0*m; 0, 0, 1, F_z_cd*L_cd/2/(A_cd*E); 0, 0, 0, 1*m]
T_y_cd := [
    1, 0, 0, 0*m;
    0, 1, 0, M_x_cd*(L_cd/2)^2/(2*E*I_cd) + F_y_cd*(L_cd/2)^3/(3*E*I_cd);
    0, 0, 1, 0*m;
    0, 0, 0, 1*m
]
T_x_cd := [
    1, 0, 0, M_y_cd*(L_cd/2)^2/(2*E*I_cd) + F_x_cd*(L_cd/2)^3/(3*E*I_cd);
    0, 1, 0, 0*m;
    0, 0, 1, 0*m;
    0, 0, 0, 1*m
]
# Rotation errors
R_z_cd := [
    1, -(M_z_cd*L_cd/2/(J_cd*G)), 0, 0*m;
    M_z_cd*L_cd/2/(J_cd*G), 1, 0, 0*m;
    0, 0, 1, 0*m;
    0, 0, 0, 1*m
] = [1, 4.68552e-7, 0, 0 m; -4.68552e-7, 1, 0, 0 m; 0, 0, 1, 0 m; 0, 0, 0, 1 m]
R_x_cd := [
    1, 0, 0, 0*m;
    0, 1, M_x_cd*L_cd/2/(E*I_cd) + F_y_cd*(L_cd/2)^2/(2*E*I_cd), 0*m;
    0, -(M_x_cd*L_cd/2/(E*I_cd) + F_y_cd*(L_cd/2)^2/(2*E*I_cd)), 1, 0*m;
    0, 0, 0, 1*m
] = [1, 0, 0, 0 m; 0, 1, -7.01827e-7, 0 m; 0, 7.01827e-7, 1, 0 m; 0, 0, 0, 1 m]
R_y_cd := [
    1, 0, M_y_cd*L_cd/2/(E*I_cd) + F_x_cd*(L_cd/2)^2/(2*E*I_cd), 0*m;
    0, 1, 0, 0*m;
    -(M_y_cd*L_cd/2/(E*I_cd) + F_x_cd*(L_cd/2)^2/(2*E*I_cd)), 0, 1, 0*m;
    0, 0, 0, 1*m
] = [1, 0, 1.43905e-7, 0 m; 0, 1, 0, 0 m; -1.43905e-7, 0, 1, 0 m; 0, 0, 0, 1 m]
# Actual Position
T_cd := U_S*T_n_cd*U_S*T_x_cd*U_S*T_y_cd*U_S*T_z_cd
R_cd := U_S*R_x_cd*U_S*R_y_cd*U_S*R_z_cd
U_S*R_x_cd*U_S*R_y_cd*U_S*I - U_S*I = [1.43905e-7 m; -7.01827e-7 m; 5.57922e-7 m; 0]
H_cd := T_cd*R_cd
# Origin
R_o_x := [1, 0, -M_r*L/(24*E*I), 0; 0, 1, 0, 0; -(-M_r*L/(24*E*I)), 0, 1, 0; 0, 0, 0, 1]
T_o_y := [1, 0, 0, 0; 0, 1, 0, 0; 0, 0, 1, (-R_a_y)/K_b - R_b_y/K_b; 0, 0, 0, 1]
R_b_y/K_b = -3.55495e-5 m
T_b_y := [1, 0, 0, 0*m; 0, 1, 0, R_b_y*(R_a_y - R_b_y)/(2*R_a_y*K_b); 0, 0, 1, 0*m; 0, 0, 0, 1*m] = [1, 0, 0, 0 m; 0, 1, 0, -3.87527e-5 m; 0, 0, 1, 0 m; 0, 0, 0, 1 m]
R_o_x := [
    1, 0, 0, 0*m;
    0, 1, R_b_y*(R_b_y + R_a_y)/(K_b*R_a_y*L_cd), 0*m;
    0, -R_b_y*(R_b_y + R_a_y)/(K_b*R_a_y*L_cd), 1, 0*m;
    0, 0, 0, 1*m
] = [1, 0, 0, 0 m; 0, 1, 0.000320322, 0 m; 0, -0.000320322, 1, 0 m; 0, 0, 0, 1 m]
T_b_x := [1, 0, 0, R_b_x*(R_a_x - R_b_x)/(2*R_a_x*K_b); 0, 1, 0, 0*m; 0, 0, 1, 0*m; 0, 0, 0, 1*m] = [1, 0, 0, 3.68876e-9 m; 0, 1, 0, 0 m; 0, 0, 1, 0 m; 0, 0, 0, 1 m]
R_o_y := [
    1, 0, R_b_x*(R_b_x + R_a_x)/(K_b*R_a_x*L_cd), 0*m;
    0, 1, 0, 0*m;
    -R_b_x*(R_b_x + R_a_x)/(K_b*R_a_y*L_cd), 0, 1, 0*m;
    0, 0, 0, 1*m
]
H_bearings := U_S*T_b_y*U_S*T_b_x*U_S*R_o_x*U_S*R_o_y = [
    1, 0, -1.62305e-5, 3.68876e-9 m;
    -2.61607e-11, 1, 0.000320322, -3.87527e-5 m;
    -8.16702e-8, -0.000320322, 1, 0 m;
    0 1/m, 0 1/m, 0 1/m, 1
]
H_bearings*[0; 0; 1; 1*m^-1] = [-1.62268e-5; 0.000281569; 1; 1 1/m]
# Summary Calculations
# Nominal geometry of the part's tip
P_tool := [-D_part/2; 0; 0; 1]
# Actual position of the tool's contact point relative to the shaft end
P_tool_f := H_bearings*H_cd*H_de*H_ef*H_fp*P_tool = [-0.0199983 m; 3.27791e-5 m; 0.100101 m; 1]
# Nominal position of the tool's contact point relative to the shaft end
P_tool_0 := (U_S*T_n_cd*U_S*T_n_de*U_S*T_n_ef*U_S*T_n_fp*P_tool) = [-0.02 m; 0 m; 0.1001 m; 1]
# Error in position of the tool's contact point relative to the shaft end
P_deflection := P_tool_f - P_tool_0 = [1.66523; 32.7791; 0.942056; 0 1/m] μm
# Segment CD
I_cd := π*D_cd^4/64
J_cd := π*D_cd^4/32
A_cd := π*D_cd^2/2
# Local Forces
F_z_cd := F_feed_z
F_y_cd := F_cut_y + R_b_y
F_x_cd := F_cut_x + R_b_x
M_z_cd := -F_cut_y*D_part/2
M_y_cd := F_cut_x*(L_part + L_ef + L_de) + R_b_x*L_de/2
M_x_cd := F_cut_y*(L_part + L_ef + L_de) + R_b_y*L_de/2
# Nominal geometry
T_n_cd := [1, 0, 0, 0*m; 0, 1, 0, 0*m; 0, 0, 1, L_cd; 0, 0, 0, 1*m]
# Translation errors
T_z_cd := [1, 0, 0, 0*m; 0, 1, 0, 0*m; 0, 0, 1, F_z_cd*L_cd/(A_cd*E); 0, 0, 0, 1*m]
T_y_cd := [
    1, 0, 0, 0*m;
    0, 1, 0, M_x_cd*L_cd^2/(2*E*I_cd) + F_y_cd*L_cd^3/(3*E*I_cd);
    0, 0, 1, 0*m;
    0, 0, 0, 1*m
]
T_x_cd := [
    1, 0, 0, M_y_cd*L_cd^2/(2*E*I_cd) + F_x_cd*L_cd^3/(3*E*I_cd);
    0, 1, 0, 0*m;
    0, 0, 1, 0*m;
    0, 0, 0, 1*m
]
# Rotation errors
R_z_cd := [1, -(M_z_cd*L_cd/(J_cd*G)), 0, 0*m; M_z_cd*L_cd/(J_cd*G), 1, 0, 0*m; 0, 0, 1, 0*m; 0, 0, 0, 1*m]
R_x_cd := [
    1, 0, 0, 0*m;
    0, 1, M_x_cd*L_cd/(E*I_cd) + F_y_cd*L_cd^2/(2*E*I_cd), 0*m;
    0, -(M_x_cd*L_cd/(E*I_cd) + F_y_cd*L_cd^2/(2*E*I_cd)), 1, 0*m;
    0, 0, 0, 1*m
]
R_y_cd := [
    1, 0, M_y_cd*L_cd/(E*I_cd) + F_x_cd*L_cd^2/(2*E*I_cd), 0*m;
    0, 1, 0, 0*m;
    -(M_y_cd*L_cd/(E*I_cd) + F_x_cd*L_cd^2/(2*E*I_cd)), 0, 1, 0*m;
    0, 0, 0, 1*m
]
# Actual Position
T_cd := U_S*T_n_cd*U_S*T_x_cd*U_S*T_y_cd*U_S*T_z_cd
R_cd := U_S*R_x_cd*U_S*R_y_cd*U_S*R_z_cd
H_cd := T_cd*R_cd
# Segment BC
I_bc := π*D_bc^4/64
J_bc := π*D_bc^4/32
A_bc := π*D_bc^2/2
# Local Forces
F_z_bc := F_feed_z
F_y_bc := F_cut_y + R_b_y
F_x_bc := F_cut_x + R_b_x
M_z_bc := -F_cut_y*D_part/2
M_y_bc := F_cut_x*(L_part + L_ef + L_de + L_cd) + R_b_x*(L_de/2 + L_cd)
M_x_bc := F_cut_y*(L_part + L_ef + L_de + L_cd) + R_b_y*(L_de/2 + L_cd)
# Nominal geometry
T_n_bc := [1, 0, 0, 0*m; 0, 1, 0, 0*m; 0, 0, 1, L_bc; 0, 0, 0, 1*m]
# Translation errors
T_z_bc := [1, 0, 0, 0*m; 0, 1, 0, 0*m; 0, 0, 1, F_z_bc*L_bc/(A_bc*E) + R_a_z*(L_bc/2)/(A_bc*E); 0, 0, 0, 1*m]
T_y_bc := [
    1, 0, 0, 0*m;
    0, 1, 0, M_x_bc*L_bc^2/(2*E*I_bc) + F_y_bc*L_bc^3/(3*E*I_bc) + 5*R_a_y*(L_bc/2)^3/(2*3*E*I_bc);
    0, 0, 1, 0*m;
    0, 0, 0, 1*m
]
T_x_bc := [
    1, 0, 0, M_y_bc*L_bc^2/(2*E*I_bc) + F_x_bc*L_bc^3/(3*E*I_bc) + 5*R_a_x*(L_bc/2)^3/(2*3*E*I_bc);
    0, 1, 0, 0*m;
    0, 0, 1, 0*m;
    0, 0, 0, 1*m
]
# Rotation errors
R_z_bc := [1, -(M_z_bc*L_cd/(J_cd*G)), 0, 0*m; M_z_bc*L_cd/(J_cd*G), 1, 0, 0*m; 0, 0, 1, 0*m; 0, 0, 0, 1*m]
R_x_bc := [
    1, 0, 0, 0*m;
    0, 1, M_x_bc*L_bc/(E*I_bc) + F_y_bc*L_bc^2/(2*E*I_bc) + R_a_y*(L_bc/2)^2/(2*E*I_bc), 0*m;
    0, -(M_x_bc*L_bc/(E*I_bc) + F_y_bc*L_bc^2/(2*E*I_bc) + R_a_y*(L_bc/2)^2/(2*E*I_bc)), 1, 0*m;
    0, 0, 0, 1*m
]
R_y_bc := [
    1, 0, M_y_bc*L_bc/(E*I_bc) + F_x_bc*L_bc^2/(2*E*I_bc) + R_a_x*(L_bc/2)^2/(2*E*I_bc), 0*m;
    0, 1, 0, 0*m;
    -(M_y_bc*L_bc/(E*I_bc) + F_x_bc*L_bc^2/(2*E*I_bc) + R_a_x*(L_bc/2)^2/(2*E*I_bc)), 0, 1, 0*m;
    0, 0, 0, 1*m
]
# Actual Position
T_bc := U_S*T_n_bc*U_S*T_x_bc*U_S*T_y_bc*U_S*T_z_bc
R_bc := U_S*R_x_bc*U_S*R_y_bc*U_S*R_z_bc
H_bc := T_bc*R_bc
# Segment AB
I_ab := π*D_ab^4/64
J_ab := π*D_ab^4/32
A_ab := π*D_ab^2/2
# Local Forces
F_z_ab := F_feed_z + R_a_z
F_y_ab := F_cut_y + R_a_y + R_b_y
F_x_ab := F_cut_x + R_a_x + R_b_x
M_z_ab := -F_cut_y*D_part/2
M_y_ab := F_cut_x*(L_part + L_ef + L_de + L_cd + L_bc) + R_b_x*(L_de/2 + L_cd + L_bc) + R_a_x*(L_bc/2)
M_x_ab := F_cut_y*(L_part + L_ef + L_de + L_cd + L_bc) + R_b_y*(L_de/2 + L_cd + L_bc) + R_a_y*(L_bc/2)
# Nominal geometry
T_n_ab := [1, 0, 0, 0*m; 0, 1, 0, 0*m; 0, 0, 1, L_ab; 0, 0, 0, 1*m]
# Translation errors
T_z_ab := [1, 0, 0, 0*m; 0, 1, 0, 0*m; 0, 0, 1, F_z_ab*L_ab/(A_ab*E); 0, 0, 0, 1*m]
T_y_ab := [
    1, 0, 0, 0*m;
    0, 1, 0, M_x_ab*L_ab^2/(2*E*I_ab) + F_y_ab*L_ab^3/(3*E*I_ab) + 5*F_t*(L_ab/2)^3/(2*3*E*I_ab);
    0, 0, 1, 0*m;
    0, 0, 0, 1*m
]
T_x_ab := [
    1, 0, 0, M_y_ab*L_ab^2/(2*E*I_ab) + F_x_ab*L_ab^3/(3*E*I_ab);
    0, 1, 0, 0*m;
    0, 0, 1, 0*m;
    0, 0, 0, 1*m
]
# Rotation errors
R_z_ab := [
    1, -(M_z_ab*L_ab/(J_ab*G) + M_mot*(L_ab/2)/(J_ab*G)), 0, 0*m;
    M_z_ab*L_ab/(J_ab*G) + M_mot*(L_ab/2)/(J_ab*G), 1, 0, 0*m;
    0, 0, 1, 0*m;
    0, 0, 0, 1*m
]
R_x_ab := [
    1, 0, 0, 0*m;
    0, 1, M_x_ab*L_ab/(E*I_ab) + F_y_ab*L_ab^2/(2*E*I_ab) + F_t*(L_ab/2)^2/(2*E*I_ab), 0*m;
    0, -(M_x_ab*L_ab/(E*I_ab) + F_y_ab*L_ab^2/(2*E*I_ab) + F_t*(L_ab/2)^2/(2*E*I_ab)), 1, 0*m;
    0, 0, 0, 1*m
]
R_y_ab := [
    1, 0, M_y_ab*L_ab/(E*I_ab) + F_x_ab*L_ab^2/(2*E*I_ab), 0*m;
    0, 1, 0, 0*m;
    -(M_y_ab*L_ab/(E*I_ab) + F_x_ab*L_ab^2/(2*E*I_ab)), 0, 1, 0*m;
    0, 0, 0, 1*m
]
# Actual Position
T_ab := U_S*T_n_ab*U_S*T_x_ab*U_S*T_y_ab*U_S*T_z_ab
R_ab := U_S*R_x_ab*U_S*R_y_ab*U_S*R_z_ab
H_ab := T_ab*R_ab
# Summary Calculations
# Nominal geometry of the part's tip
P_tool := [-D_part/2; 0; 0; 1]
# Actual position of the tool's contact point relative to the shaft end
P_tool_f := H_ab*H_bc*H_cd*H_de*H_ef*H_fp*P_tool = [-0.0199942 m; -3.02917e-5 m; 0.136701 m; 1]
# Nominal position of the tool's contact point relative to the shaft end
P_tool_0 := (U_S*T_n_ab*U_S*T_n_bc*U_S*T_n_cd*U_S*T_n_de*U_S*T_n_ef*U_S*T_n_fp*P_tool) = [-0.02 m; 0 m; 0.1367 m; 1]
# Error in position of the tool's contact point relative to the shaft end
P_deflection := P_tool_f - P_tool_0 = [5.81829; -30.2917; 1.42291; 0 1/m] μm
