# Tool Mount & Cross-Slide - HTMs
# Notes
# The stiffnesses for the following parts are considered as very high in the leadscrew chain and are therefore disregarded for the equivalent stiffness calculation:
# - Leadscrew Holder
# - Preload Nut
# - Tool Holder
# Forces on the Tool Edge
F_cut_x := 10 N
F_cut_y := 115 N
F_feed_z := 50 N
# Flexure - Characteristics
# Dimensions - Tool Holder to Leadscrew Holder
w_flexure := 1.66 cm
e_flexure := 0.635 cm
L_flexure := 6.5 cm
# Material Properties | Properties - Flexure without leadscrew
E_flexure := 70 GPa
k_flexure := 1 N/m
# Leadscrew Characteristics
# Reference
# Left Hand: https://www.mcmaster.com/90036A229/
# Dimensions
d_thread := 0.25 in
TPI_thread := 20 1/in
P_thread := 1/TPI_thread
L_ls_free := 8 cm
# Properties
E_ls := 200 GPa
k_leadscrew := (π*(d_thread/2)^2)*E_ls/L_ls_free = 79.173 N/μm
# Leadscrew Bearings Characteristics (Thrust Ball Bearing)
# Reference
# https://www.mcmaster.com/6655K13/
# Bearing Properties
k_bearing := 50 N/μm
# Toolpost Characteristics
# Reference
# https://www.dropbox.com/s/odyxwst0esw7gmy/272L-Cross-001-Toolpost-2017.PDF?dl=0
# Toolpost Properties
h_tool_flexure := 0.48 in
L_tool_holes := 0.50 in
# Tool Characteristics
# Reference
# https://www.mcmaster.com/3367A333/
# Tool Properties
L_tool_free := 1.5 in
b_tool := 0.375 in
h_tool := 0.375 in
E_tool := 210 GPa
# Equivalent Stiffness
# Leadscrew Chain
k_ls_equivalent := 1/(1/(w_flexure*e_flexure*E_flexure/L_flexure) + 1/k_leadscrew + 1/k_bearing)
# Flexure and Leadscrew - Parallel
k_flexure_equivalent := k_ls_equivalent + k_flexure
# Cutting Edge to Carriage
k_total_equivalent := 1/(1/k_flexure_equivalent + 1/(b_tool*h_tool*E_tool/L_tool_free))
# Moments of Toolpost on Flexure (for FEA)
M_x_FEA := F_feed_z*(h_tool_flexure + h_tool) = 1.08585 N*m
M_y_FEA := -F_feed_z*(L_tool_free + L_tool_holes) = -2.54 N*m
M_z_FEA := F_cut_x*(h_tool_flexure + h_tool) - F_cut_y*(L_tool_free + L_tool_holes) = -5.62483 N*m
# HTMs
T_x := [1, 0, 0, F_cut_x/k_total_equivalent; 0, 1, 0, 0*m; 0, 0, 1, 0*m; 0, 0, 0, 1*m]
