# Tool Mount & Cross-Slide - HTMs
# Notes
# The stiffnesses for the following parts are considered as very high in the leadscrew chain and are therefore disregarded for the equivalent stiffness calculation:
# - Leadscrew Holder
# - Preload Nut
# - Tool Holder
# Forces on the Tool Edge
F_cut_x := 10 N
F_cut_y := 115 N
F_feed_z := 50 N
# Flexure - Characteristics
# Dimensions - Tool Holder to Leadscrew Holder
w_flexure := 1.5 cm
h_flexure := 0.5 in
L_flexure := 7.565 cm
# Material Properties | Dimensions - Center to Tool Holder
E_flexure := 70 GPa
L_flexure_center := 2.939 cm
# Stiffnesses - Flexure without leadscrew
k_flexure_x := 4.13 N/μm
k_flexure_y := 0.8 N/μm
k_flexure_z := 16.5 N/μm
k_flexure_θx := 0.0813 N*m/rad
k_flexure_θy := 920 N*m/rad
k_flexure_θz := 225 N*m/rad
# Leadscrew Characteristics
# Reference
# Left Hand: https://www.mcmaster.com/90036A229/
# Dimensions
d_thread := 0.25 in
TPI_thread := 20 1/in
P_thread := 1/TPI_thread
L_ls_free := 4.495 cm
# Properties
E_ls := 200 GPa
k_leadscrew := (π*(d_thread/2)^2)*E_ls/L_ls_free = 140.909 N/μm
# Leadscrew Bearings Characteristics (Thrust Ball Bearing)
# Reference
# https://www.mcmaster.com/6655K13/
# Bearing Properties
k_bearing := 2.5 N/μm
# Toolpost Characteristics
# Reference
# https://www.dropbox.com/s/odyxwst0esw7gmy/272L-Cross-001-Toolpost-2017.PDF?dl=0
# Toolpost Properties
h_tool_flexure := 0.48 in
L_tool_holes := 0.50 in
E_toolpost := 69 GPa
w_toolpost := 1.8 in
L_toolpost := 1 in
G_toolpost := 27 GPa
# Tool Characteristics
# Reference
# https://www.mcmaster.com/3367A333/
# Tool Properties
L_tool_free := 1.5 in
b_tool := 0.375 in
h_tool := 0.375 in
E_tool := 210 GPa
# Equivalent Stiffness
# Leadscrew Chain
k_ls_equivalent := 1/(1/(w_flexure*h_flexure*E_flexure/L_flexure) + 1/k_leadscrew + 1/(2*k_bearing))
# Flexure and Leadscrew - Parallel
k_flexure_equivalent := k_ls_equivalent + k_flexure_x
# Cutting Edge to Carriage
k_total_equivalent := 1/(1/k_flexure_equivalent + 1/(b_tool*h_tool*E_tool/L_tool_free))
# Moments of Toolpost on Flexure (for FEA)
M_x_FEA := F_feed_z*(h_tool_flexure + h_tool) = 1.08585 N*m
M_y_FEA := -F_feed_z*(L_tool_free + L_tool_holes) = -2.54 N*m
M_z_FEA := F_cut_x*(h_tool_flexure + h_tool) - F_cut_y*(L_tool_free + L_tool_holes) = -5.62483 N*m
# HTMs - Flexure
# Nominal geometry
T_n_flexure := [1, 0, 0, -L_flexure_center; 0, 1, 0, h_flexure; 0, 0, 1, 0 m; 0, 0, 0, 1*m]
U_S := [1, 0, 0, 0; 0, 1, 0, 0; 0, 0, 1, 0; 0*m^-1, 0 m^-1, 0 m^-1, 1 m^-1]
# Translation errors
T_z_flexure := [1, 0, 0, 0*m; 0, 1, 0, 0*m; 0, 0, 1, F_feed_z/k_flexure_z; 0, 0, 0, 1*m]
T_y_flexure := [1, 0, 0, 0*m; 0, 1, 0, F_cut_y/k_flexure_y; 0, 0, 1, 0*m; 0, 0, 0, 1*m]
T_y_flexure := [1, 0, 0, 0*m; 0, 1, 0, 0 m; 0, 0, 1, 0*m; 0, 0, 0, 1*m]
# Using total_equivalent is double counting tool displacment I think?
T_x_flexure := [1, 0, 0, F_cut_x/k_total_equivalent; 0, 1, 0, 0*m; 0, 0, 1, 0*m; 0, 0, 0, 1*m]
T_x_flexure_new := [1, 0, 0, F_cut_x/k_flexure_equivalent; 0, 1, 0, 0*m; 0, 0, 1, 0*m; 0, 0, 0, 1*m]
# Rotation errors
R_z_flexure := [1, -M_z_FEA/k_flexure_θz, 0, 0*m; M_z_FEA/k_flexure_θz, 1, 0, 0*m; 0, 0, 1, 0*m; 0, 0, 0, 1*m] = [1, 0.0249992, 0, 0 m; -0.0249992, 1, 0, 0 m; 0, 0, 1, 0 m; 0, 0, 0, 1 m]
R_x_flexure := [1, 0, 0, 0*m; 0, 1, -M_x_FEA/k_flexure_θx, 0*m; 0, M_x_FEA/k_flexure_θx, 1, 0*m; 0, 0, 0, 1*m] = [1, 0, 0, 0 m; 0, 1, -13.3561, 0 m; 0, 13.3561, 1, 0 m; 0, 0, 0, 1 m]
R_y_flexure := [1, 0, M_y_FEA/k_flexure_θy, 0*m; 0, 1, 0, 0*m; -M_y_FEA/k_flexure_θy, 0, 1, 0*m; 0, 0, 0, 1*m] = [1, 0, -0.00276087, 0 m; 0, 1, 0, 0 m; 0.00276087, 0, 1, 0 m; 0, 0, 0, 1 m]
# Actual Position
T_flexure := (U_S*T_n_flexure)*U_S*T_x_flexure*U_S*T_y_flexure*U_S*T_z_flexure
R_flexure := (U_S*R_x_flexure)*(U_S*R_y_flexure)*(U_S*R_z_flexure)
H_flexure := T_flexure  # R_flexure
# HTMs - Tool Post
I_z_toolpost := w_toolpost*L_toolpost^3/12
I_x_toolpost := L_toolpost*w_toolpost^3/12
I_y_toolpost := h_tool_flexure*L_toolpost^3/12
J_toolpost := w_toolpost*L_toolpost/12*(w_toolpost^2 + L_toolpost^2)
A_toolpost := w_toolpost*L_toolpost
# Nominal geometry
T_n_toolpost := [1, 0, 0, L_tool_holes; 0, 1, 0, h_tool_flexure; 0, 0, 1, 0 m; 0, 0, 0, 1*m]
U_S := [1, 0, 0, 0; 0, 1, 0, 0; 0, 0, 1, 0; 0*m^-1, 0 m^-1, 0 m^-1, 1 m^-1]
# Translation errors
T_z_toolpost := [
    1, 0, 0, 0*m;
    0, 1, 0, 0*m;
    0, 0, 1, F_feed_z*h_tool_flexure^3/(3*E_toolpost*I_z_toolpost);
    0, 0, 0, 1*m
]
T_y_toolpost := [1, 0, 0, 0*m; 0, 1, 0, -F_cut_y*h_tool_flexure/(A_toolpost*E_toolpost); 0, 0, 1, 0*m; 0, 0, 0, 1*m]
T_z_toolpost_new := [
    1, 0, 0, 0*m;
    0, 1, 0, 0*m;
    0, 0, 1, -F_feed_z*w_toolpost/2/(L_toolpost*h_tool_flexure*E_toolpost);
    0, 0, 0, 1*m
]
# Modeling toolpost as a double end-supported beam:
# Compression in Y and Z, bending about Y
# Therefore Rz and Rx should be 0, Ry
T_x_toolpost := [
    1, 0, 0, -F_cut_x*h_tool_flexure^3/(3*E_toolpost*I_x_toolpost) + F_cut_y*L_tool_free*h_tool_flexure^2/(2*E_toolpost*I_x_toolpost);
    0, 1, 0, 0*m;
    0, 0, 1, 0*m;
    0, 0, 0, 1*m
]
T_x_toolpost_new := [
    1, 0, 0, -F_cut_x*w_toolpost^3/(48*E_toolpost*I_y_toolpost);
    0, 1, 0, 0*m;
    0, 0, 1, 0*m;
    0, 0, 0, 1*m
]
# Rotation errors
R_z_toolpost := [
    1, F_cut_x*h_tool_flexure^2/(2*E_toolpost*I_z_toolpost) - F_cut_y*L_tool_free*h_tool_flexure/(E_toolpost*I_z_toolpost), 0, 0*m;
    -F_cut_x*h_tool_flexure^2/(2*E_toolpost*I_z_toolpost) + F_cut_y*L_tool_free*h_tool_flexure/(E_toolpost*I_z_toolpost), 1, 0, 0*m;
    0, 0, 1, 0*m;
    0, 0, 0, 1*m
] = [1, -1.22275e-5, 0, 0 m; 1.22275e-5, 1, 0, 0 m; 0, 0, 1, 0 m; 0, 0, 0, 1 m]
R_x_toolpost := [
    1, 0, 0, 0*m;
    0, 1, -F_feed_z*h_tool_flexure^2/(2*E_toolpost*I_x_toolpost), 0*m;
    0, F_feed_z*h_tool_flexure^2/(2*E_toolpost*I_x_toolpost), 1, 0*m;
    0, 0, 0, 1*m
] = [1, 0, 0, 0 m; 0, 1, -2.66238e-7, 0 m; 0, 2.66238e-7, 1, 0 m; 0, 0, 0, 1 m]
R_y_toolpost := [
    1, 0, F_feed_z*L_tool_free*h_tool_flexure/(J_toolpost*G_toolpost), 0*m;
    0, 1, 0, 0*m;
    -F_feed_z*L_tool_free*h_tool_flexure/(J_toolpost*G_toolpost), 0, 1, 0*m;
    0, 0, 0, 1*m
] = [1, 0, 3.24948e-6, 0 m; 0, 1, 0, 0 m; -3.24948e-6, 0, 1, 0 m; 0, 0, 0, 1 m]
# Actual Position
T_toolpost := (U_S*T_n_toolpost)*U_S*T_x_toolpost*U_S*T_y_toolpost*U_S*T_z_toolpost
R_toolpost := (U_S*R_x_toolpost)*(U_S*R_y_toolpost)*(U_S*R_z_toolpost)
H_toolpost := T_toolpost*R_toolpost
# HTMs - Tool
I_y_tool := b_tool*h_tool^3/12
I_z_tool := h_tool*b_tool^3/12
J_tool := b_tool*h_tool/12*(b_tool^2 + h_tool^2)
A_tool := b_tool*h_tool
# Nominal geometry
T_n_tool := [1, 0, 0, L_tool_free; 0, 1, 0, h_tool; 0, 0, 1, 0 m; 0, 0, 0, 1*m]
U_S := [1, 0, 0, 0; 0, 1, 0, 0; 0, 0, 1, 0; 0*m^-1, 0 m^-1, 0 m^-1, 1 m^-1]
# Translation errors
T_z_tool := [1, 0, 0, 0*m; 0, 1, 0, 0*m; 0, 0, 1, F_feed_z*L_tool_free^3/(3*E_tool*I_z_tool); 0, 0, 0, 1*m]
T_y_tool := [1, 0, 0, 0*m; 0, 1, 0, -F_cut_y*L_tool_free^3/(3*E_tool*I_y_tool); 0, 0, 1, 0*m; 0, 0, 0, 1*m]
T_x_tool := [1, 0, 0, -F_cut_x*L_tool_free/(A_tool*E_tool); 0, 1, 0, 0*m; 0, 0, 1, 0*m; 0, 0, 0, 1*m]
# Rotation errors
R_z_tool := [
    1, F_cut_y*L_tool_free^2/(2*E_tool*I_y_tool), 0, 0*m;
    -F_cut_y*L_tool_free^2/(2*E_tool*I_y_tool), 1, 0, 0*m;
    0, 0, 1, 0*m;
    0, 0, 0, 1*m
] = [1, 0.000579455, 0, 0 m; -0.000579455, 1, 0, 0 m; 0, 0, 1, 0 m; 0, 0, 0, 1 m]
R_x_tool := [1, 0, 0, 0*m; 0, 1, 0, 0*m; 0, 0, 1, 0*m; 0, 0, 0, 1*m]
R_y_tool := [
    1, 0, F_feed_z*L_tool_free^2/(2*E_tool*I_z_tool), 0*m;
    0, 1, 0, 0*m;
    -F_feed_z*L_tool_free^2/(2*E_tool*I_z_tool), 0, 1, 0*m;
    0, 0, 0, 1*m
] = [1, 0, 0.000251937, 0 m; 0, 1, 0, 0 m; -0.000251937, 0, 1, 0 m; 0, 0, 0, 1 m]
# Actual Position
T_tool := (U_S*T_n_tool)*U_S*T_x_tool*U_S*T_y_tool*U_S*T_z_tool
R_tool := (U_S*R_x_tool)*(U_S*R_y_tool)*(U_S*R_z_tool)
H_tool := T_tool*R_tool
# Summary Calculations
# Nominal geometry of the part's tip
P_end := [0 m; 0; 0; 1]
# Actual position of the tool's contact point relative to the shaft end
P_tool_f := H_flexure*H_toolpost*H_tool*P_end = [0.021411 m; 0.0344027 m; 9.31524e-6 m; 1]
# Nominal position of the tool's contact point relative to the shaft end
P_tool_0 := (U_S*T_n_flexure*U_S*T_n_toolpost*U_S*T_n_tool*P_end) = [0.02141 m; 0.034417 m; 0 m; 1]
# Error in position of the tool's contact point relative to the shaft end
P_deflection := P_tool_f - P_tool_0 = [1.03915; -14.2698; 9.31524; 0 1/m] μm
P_deflection = [1.03915; -14.2698; 9.31524; 0 1/m] μm
